# Расчет настроек ПИ регулятора
# с использованием корневого показателя  колебательности  m = α/ω = const
# Передаточная функция объекта управления:
Wob(s) == Kob*e^(-τ*s)/((T1*s + 1)*(T2*s + 1))
# Передаточная функция ПИ - регулятора:
Wr(s) == Kr*(1 + 1/(Ti*s))
# Исходные данные:
Kob := 1.0
T1 := 12
T2 := 120
τ := 10
i := sqrt(-1)
Sum_T := T1 + T2 + τ = 142  # Сумма постоянных времени
ωh := 100/Sum_T
ωh = 0.704225  # Определяем верхнюю расчетную частоту
n := 1000  # Задаем количество точек по частоте
dω := ωh/n
dω = 0.000704225  # Определяем шаг по частоте
ω := dω, 2*dω .. ωh  # Определяем диапазон и значения частот для расчета
# КЧХ объекта управления:
m := 0
s(ω) := -m*ω + i*ω
Wob(ω) := Kob*e^(-τ*s(ω))/((T1*s(ω) + 1)*(T2*s(ω) + 1))
Rob(ω) := |Wob(ω)|  # АЧХ объекта
Fob(ω) := arg(Wob(ω))  # ФЧХ объекта
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m(ψ) := -ln(1 - ψ)/(2*π)
M(ψ) := (1 + m(ψ)^2)/(2*m(ψ))  # Связь корневого (m) и частотного (M) показателей колебательности со степенью затухания ψ
ψ := 0.9
m(ψ) = 0.366468
M(ψ) = 1.54761
m := 0.366  # Вводим заданное значение показателя для расчета границы запаса устойчивости
ω := dω, 2*dω .. ωh  # Определяем диапазон и значения частот для расчета
s(ω) := -m*ω + i*ω  # Для расчета расширенной КЧХ (при α/ω =m )
# Расширенная КЧХ объекта управления:
Wob(ω) := Kob*e^(-τ*s(ω))/((T1*s(ω) + 1)*(T2*s(ω) + 1))
Rob(ω) := |Wob(ω)|
Pob(ω) := Re(Wob(ω))
Qob(ω) := Im(Wob(ω))
# Расчет границы заданного значения запаса устойчивости m=0.366
Ki(ω) := -ω*(1 + m^2)*Qob(ω)/Rob(ω)^2
Kr(ω) := (-Pob(ω) - m*Qob(ω))/Rob(ω)^2
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# Определяем оптимум по условию Ki(ω)=max, что дает минимум линейного интегрального критерия
ω := 0.03
ωm := Maximize(Ki, ω) = 0.0390368
ωm = 0.0390368
# Оптимальные значения параметров ПИ-регулятора (точка 1)
Kr1 := Kr(ωm)
Kr1 = 4.10775
Ki1 := Ki(ωm) = 0.0851667
Ti1 := Kr1/Ki1
Ti1 = 48.2319
# Точка 2
ω2 := ωm*1.25
ω2 = 0.0487959
Kr2 := Kr(ω2)
Kr2 = 5.18044
Ki2 := Ki(ω2)
Ki2 = 0.0668282
Ti2 := Kr2/Ki2
Ti2 = 77.5189
Wr2(ω) := Kr2 + Ki2/s(ω)
# Точка 3
ω3 := ωm*0.8
ω3 = 0.0312294
Kr3 := Kr(ω3)
Kr3 = 3.10058
Ki3 := Ki(ω3)
Ki3 = 0.0762719
Ti3 := Kr3/Ki3
Ti3 = 40.6516
Wr3(ω) := Kr3 + Ki3/s(ω)
ω := dω, 2*dω .. ωh
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# Проверка точности настройки по КЧХ замкнутой системы
ωh := ωm*10 = 0.390368  # Верхняя частота
n := 500  # Количество точек по частоте
dω := ωm/n  # Шаг по частоте
ω := dω, 2*dω .. ωh  # Определяем диапазон и значения частот для расчета
s(ω) := i*ω
# Для расчета обычной КЧХ
Wob(ω) := Kob*e^(-τ*s(ω))/((T1*s(ω) + 1)*(T2*s(ω) + 1))
Wr(ω) := Kr1*(1 + 1/(Ti1*s(ω)))  # КЧХ ПИ - регулятора
Wrs(ω) := Wob(ω)*Wr(ω)  # КЧХ разомкнутой системы
Wzs(ω) := Wrs(ω)/(1 + Wrs(ω))  # КЧХ замкнутой системы по каналу задания
Rzs1(ω) := |Wzs(ω)|  # АЧХ замкнутой системы по каналу задания
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# АЧХ замкнутой системы
# по каналу задания
# для точки 1
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# КЧХ
# разомкнутой
# системы
# для точки 1
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# Построение процессов регулирования
t_max := 4*Sum_T = 568  # Оценка максимального времени расчета
t := 0, 0.5 .. 600  # Задаем диапазон и интервал времени расчета
# Точка 1 (для оптимальных значений параметров ПИ- регулятора)
Wzsλ(ω) := Wob(ω)/(1 + Wrs(ω))  # КЧХ замкнутой системы при возмущении λ (рег. органом)
y1(t) := 2/π*integral(Re(Wzsλ(ω))*sin(ω*t)/ω, ω = 0 .. ωh)  # Процесс при возмущении λ (рег.органом)
yu1(t) := 2/π*integral(Re(Wzs(ω))*sin(ω*t)/ω, ω = 0 .. ωh)  # Процесс при возмущении по заданию
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# Определяем параметры ПИ-регулятора, КЧХ системы и переходные процессы для других точек
# Задаем частоты для других точек на границе m = 0.366
ω2 := ωm*1.25
ω3 := ωm*0.8
# Точка 2
Kr2 := Kr(ω2)
Kr2 = 5.18044
Ki2 := Ki(ω2)
Ki2 = 0.0668282
Ti2 := Kr2/Ki2
Ti2 = 77.5189
Wr2(ω) := Kr2 + Ki2/s(ω)
Wrs2(ω) := Wob(ω)*Wr2(ω)
Wzs2(ω) := Wrs2(ω)/(1 + Wrs2(ω))
Rzs2(ω) := |Wzs2(ω)|
Wzsλ2(ω) := Wob(ω)/(1 + Wrs2(ω))
y2(t) := 2/π*integral(Re(Wzsλ2(ω))*sin(ω*t)/ω, ω = 0 .. ωh)
# Процесс
# по λ
# Процесс
# по заданию
yu2(t) := 2/π*integral(Re(Wzs2(ω))*sin(ω*t)/ω, ω = 0 .. ωh)
# Точка 3
ω3 = 0.0312294
Kr3 := Kr(ω3)
Kr3 = 3.10058
Ki3 := Ki(ω3)
Ki3 = 0.0762719
Ti3 := Kr3/Ki3
Ti3 = 40.6516
Wr3(ω) := Kr3 + Ki3/s(ω)
Wrs3(ω) := Wob(ω)*Wr3(ω)
Wzs3(ω) := Wrs3(ω)/(1 + Wrs3(ω))
Rzs3(ω) := |Wzs3(ω)|
# Процесс
# по λ
Wzsλ3(ω) := Wob(ω)/(1 + Wrs3(ω))
y3(t) := 2/π*integral(Re(Wzsλ3(ω))*sin(ω*t)/ω, ω = 0 .. ωh)
# Процесс
# по заданию
yu3(t) := 2/π*integral(Re(Wzs3(ω))*sin(ω*t)/ω, ω = 0 .. ωh)
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# КЧХ
# разомкнутой
# системы
# для точек 1, 2 и 3
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# КЧХ
# замкнутой
# системы
# для точек 1, 2 и 3
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# АЧХ замкнутой системы
# по каналу задания
# для точек 1, 2 и 3
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# Процессы регулирования в АСР при возмущении λ для трех вариантов настройки ПИ-регулятора
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# Процессы регулирования в АСР при возмущении по заданию
# для трех вариантов настройки ПИ-регулятора
