# [area: ФА и ИНС]
φ(b) := ln(b + sqrt(b^2 + 1))
HS(N, In, W, φ, y, x) :=
    "Это ИНС"
    y[0] ← In[0]
    y[1] ← In[1]
    y[2] ← φ(y[0]*x[0] + y[1]*x[1])
    y[3] ← φ(y[0]*x[2] + y[1]*x[3])
    y[4] ← φ(y[2]*x[4] + y[3]*x[5] + y[4]*x[6])
    y
# [area: ШИМ]
Shim(y_NS, y, CHIM, dt) :=
    yish ← y[0] + dt*(y_NS - y[1])
    yr ← sign(yish)*1 if |yish| ≥ CHIM
    yr ← y[1] if |yish| < CHIM
    yr ← 0 if |yish| < 0.5*CHIM
    y ← [yish; yr]
# [area: ИМ]
IM(y, yr, dt, L, ΔRO, TIM) :=
    yμ ← y + dt*sign(yr)*100/TIM
    yμ ← sign(yμ)*ΔRO if |yμ| > ΔRO
    y ← yμ
    y
# [area: Объект]
object(y, yμ, dt) :=
    "Это объект регулирования с передаточной функцией W(s)"
    A1 ← (1 - dt/11)*y[0] + 0.52*dt/11*yμ
    A2 ← (1 - dt/9)*y[1] + 1*dt/9*A1
    A3 ← (1 - dt/0.9)*y[2] + 0.25*dt/0.9*yμ
    A4 ← (1 - dt/0.7)*y[3] + 1*dt/0.7*A3
    y ← [A1; A2; A3; A4]
    y
# [area: АСР]
ASR(N, Tr, dt, λ, u, φ, W, CHIM, L, ΔRO, TIM, HS, Shim, IM, object, x) :=
    "Задаем начальные условия объекта"
    g1 ← 0
    g2 ← 0
    for i ∈ 0 .. 3
        yob[i] ← 0
    "Задаем начальные условия нейронной сети"
    for i ∈ 0 .. N - 1
        yNS[i] ← 0
    "Задаем начальный вектор выходных значений АСР"
    for i ∈ 0 .. 12
        Y[0, i] ← 0
    "Задаем начальные условия для шима"
    for i ∈ 0 .. 1
        yshim[i] ← 0
    "Задаем начальные условия для има"
    yim ← 0
    "Задаем начальные условия для показателей качества"
    for i ∈ 0 .. 3
        I_1[i] ← 0
        I_2[i] ← 0
    b ← 0
    c ← 0
    "Задаем цикл АСР"
    for j ∈ 1 .. Tr/dt
        "Задаем возмущение"
        Y[j, 1] ← λ
        "Задаем задание"
        Y[j, 2] ← u
        "Задаем счетчик"
        Y[j, 0] ← dt*j
        "Сигнал рассогласования"
        In[0] ← Y[j, 2] - Y[j - 1, 8]
        a ←
            Y[j - 1, 9] - Y[j - 2, 9] if j > 2
            0 otherwise
        In[1] ← In[0] - a
        Y[j, 10] ← In[0]
        Y[j, 11] ← In[1]
        yNS ← HS(N, In, W, φ, yNS, x)
        Y[j, 3] ← yNS[N - 1]
        yδ ← Y[j, 3]
        yshim ← Shim(yδ, yshim, CHIM, dt)
        Y[j, 4] ← yshim[1]
        yim ← IM(yim, yshim[1], dt, L, ΔRO, TIM)
        Y[j, 5] ← yim
        yλ ← Y[j, 1] + Y[j, 5]
        yob ← object(yob, yλ, dt)
        Y[j, 6] ← yob[1]
        Y[j, 7] ← yob[3]
        Y[j, 8] ← Y[j - 1, 8] if j ≤ floor(6.2/dt)
        Y[j, 8] ← Y[j - floor(6.2/dt), 6] otherwise
        Y[j, 9] ← Y[j - 1, 9] if j ≤ floor(0.4/dt)
        Y[j, 9] ← Y[j - floor(0.4/dt), 7] otherwise
        "Расчет интегральных критериев"
        I_1[2] ← I_1[2] + dt*|Y[j, 10]|
        I_2[2] ← I_2[2] + dt*|Y[j, 11]|
        "Поиск 1-й и 3-й амлитуд"
        if Y[j, 8] < Y[j - 1, 8] and b == 0
            A1 ← Y[j - 1, 8]
            b ← 1
        b ← 2 if Y[j, 8] > Y[j - 1, 8] and (b == 1)
        if Y[j, 8] < Y[j - 1, 8] and b == 2
            A3 ← Y[j - 1, 8]
            b ← 3
        b ← 4 if Y[j, 8] > Y[j - 1, 8] and (b == 3)
        if Y[j, 9] < Y[j - 1, 9] and c == 0
            B1 ← Y[j - 1, 9]
            c ← 1
        c ← 2 if Y[j, 9] > Y[j - 1, 9] and (c == 1)
        if Y[j, 9] < Y[j - 1, 9] and c == 2
            B3 ← Y[j - 1, 9]
            c ← 3
        c ← 4 if Y[j, 9] > Y[j - 1, 9] and (c == 3)
    Y[0, 12] ← I_1[2]
    Y[1, 12] ← I_2[2]
    Y[2, 12] ← A1
    Y[3, 12] ← B1
    Y[4, 12] ←
        0 if A1 == 0
        1 - A3/A1 otherwise
    Y[5, 12] ←
        0 if B1 == 0
        1 - B3/B1 otherwise
    Y
# [area: Структура ИНС]
analizy(x, N, Tr, dt, λ, u, φ, CHIM, L, ΔRO, TIM, ASR) :=
    H ← ASR(N, Tr, dt, λ, u, φ, W, CHIM, L, ΔRO, TIM, HS, Shim, IM, object, x)
    H
# [area: Параметры + Функция цели]
CHIM := 2
L := .01
ΔRO := 100
Tr := 500
N := 5
dt := 1
λ := 0
u := 1
TIM := 500
Sqr(x) :=
    H ← 0
    "Цикл работает по количеству весовых коэффициентов"
    for k ∈ 0 .. 6
        xf[k] ← x[k]
    H ← analizy(xf, N, Tr, dt, λ, u, φ, CHIM, L, ΔRO, TIM, ASR)
    I ← H[1, 12]
    I
str3 ← if(H[5, 7] < .85, 10^6, 0)
str2 ← if(H[4, 19] < .85, 10^6, 0)
str1 ← if(H[5, 7] < .85, 10^6, 0)
# [area: OPT+ MGA]
MGA(μ, xmax, xmin, ε, Sqr) :=
    z1 ← time(1)
    N ← length(xmax)
    m ← floor(((μ + N) + 1)/.9)
    for j ∈ 0 .. m
        for i ∈ 0 .. N - 1
            x[i, j] ← rnd(xmax[i] - xmin[i]) + xmin[i]
        x[N, j] ← Sqr(x[:, j])
    z ← 0
    x ← rsort(x, N)
    while 1/m*sum(|x[N, n] - x[N, 0]|, n = 0 .. m) > ε
        z ← z + 1
        r ← 0
        while r ≤ ceil(.1*m)
            r ← r + 1
            h ← 0
            while h == 0
                Mt ← 0
                for j ∈ 0 .. N
                    P[j] ← floor(rnd(.9*m))
                for j ∈ 1 .. N
                    for jj ∈ 0 .. j - 1
                        Mt ← 1 if P[jj] == P[j]
                h ← 1 if Mt == 0
            for j ∈ 0 .. N
                as[:, j] ← x[:, P[j]]
            k ← 0
            as ← rsort(as, N)
            while |as[N, N] - as[N, 0]| > ε
                a ← as
                for i ∈ 0 .. N - 1
                    a[i, N + 1] ← 1/N*(sum(a[i, j], j = 0 .. N) - a[i, N])
                    a[i, N + 2] ← a[i, N + 1] + 1.*(a[i, N + 1] - a[i, N])
                a[N, N + 2] ← Sqr(a[:, N + 2])
                if a[N, N + 2] ≤ a[N, 0]
                    for i ∈ 0 .. N - 1
                        a[i, N + 3] ← a[i, N + 1] + 2*(a[i, N + 2] - a[i, N + 1])
                    a[N, N + 3] ← Sqr(a[:, N + 3])
                    a[:, N] ← a[:, N + 3] if a[N, N + 3] ≤ a[N, 0]
                    a[:, N] ← a[:, N + 2] otherwise
                otherwise
                    a[:, N] ← a[:, N + 2] if a[N, N + 2] < a[N, N - 1]
                    a[:, N] ← a[:, N + 2] if a[N, N + 2] < a[N, N]
                    otherwise
                        for i ∈ 0 .. N - 1
                            a[i, N + 4] ← a[i, N + 1] + 0.5*(a[i, N] - a[i, N + 1])
                        a[N, N + 4] ← Sqr(a[:, N + 4])
                        if a[N, N + 4] ≥ a[N, N]
                            for j ∈ 1 .. N
                                for i ∈ 0 .. N - 1
                                    a[i, j] ← a[i, 0] + 0.5*(a[i, j] - a[i, 0])
                                a[N, j] ← Sqr(a[:, j])
                        a[:, N] ← a[:, N + 4] otherwise
                as ← 0
                for j ∈ 0 .. N
                    as[:, j] ← a[:, j]
                as ← rsort(as, N)
                k ← k + 1
                if k > 10000*N
                    ads ← as[:, 0]
                    ads[N + 1] ← "Alarm Program stop in DM"
                    ads[N + 2] ← k
                    return ads
            x[:, floor(.9*m) + r] ← a[:, 0]
            x ← rsort(x, N)
            z2 ← time(1)
            Δt ← z2 - z1
            return x if z > 2*m
    xx ← x[:, 0]
    xx[N + 1] ← Δt
    xx
Opt(X0, ε, Sqr) :=
    z1 ← time(1)
    k ← 0
    N ← length(X0)
    as[:, 0] ← X0
    for j ∈ 1 .. N
        for i ∈ 0 .. N - 1
            as[i, j] ← X0[i] + 1/(N*sqrt(2))*(sqrt(N - 1) + N - 1) if j - 1 == i
            as[i, j] ← X0[i] + 1/(N*sqrt(2))*(sqrt(N - 1) - 1) otherwise
    for j ∈ 0 .. N
        as[N, j] ← Sqr(as[:, j])
    as ← rsort(as, N)
    while |as[N, N] - as[N, 0]| > ε
        a ← as
        for i ∈ 0 .. N - 1
            a[i, N + 1] ← 1/N*(sum(a[i, j], j = 0 .. N) - a[i, N])
            a[i, N + 2] ← a[i, N + 1] + 1*(a[i, N + 1] - a[i, N])
        a[N, N + 2] ← Sqr(a[:, N + 2])
        if a[N, N + 2] ≤ a[N, 0]
            for i ∈ 0 .. N - 1
                a[i, N + 3] ← a[i, N + 1] + 2*(a[i, N + 2] - a[i, N + 1])
            a[N, N + 3] ← Sqr(a[:, N + 3])
            a[:, N] ← a[:, N + 3] if a[N, N + 3] ≤ a[N, 0]
            a[:, N] ← a[:, N + 2] otherwise
        otherwise
            a[:, N] ← a[:, N + 2] if a[N, N + 2] < a[N, N - 1]
            otherwise
                a[:, N] ← a[:, N + 2] if a[N, N + 2] < a[N, N]
                for i ∈ 0 .. N - 1
                    a[i, N + 4] ← a[i, N + 1] + 0.5*(a[i, N] - a[i, N + 1])
                a[N, N + 4] ← Sqr(a[:, N + 4])
                if a[N, N + 4] ≥ a[N, N]
                    for j ∈ 1 .. N
                        for i ∈ 0 .. N - 1
                            a[i, j] ← a[i, 0] + 0.5*(a[i, j] - a[i, 0])
                        a[N, j] ← Sqr(a[:, j])
                a[:, N] ← a[:, N + 4] otherwise
        as ← 0
        for j ∈ 0 .. N
            as[:, j] ← a[:, j]
        as ← rsort(as, N)
        k ← k + 1
        if k > 500*N
            ads ← as[:, 0]
            ads[N + 1] ← "Alarm Program stop"
            ads[N + 2] ← k
            return ads
    ao ← as[:, 0]
    z2 ← time(2)
    Δt ← z2 - z1
    ao[N + 1] ← Δt
    ao
# [area: Оптимизация]
ε := 1
μ := 25
k := 6
min := -5
max := 5
xmin :=
    for i ∈ 0 .. k
        xmin[i] ← min
        xmin
xmax :=
    for i ∈ 0 .. k
        xmax[i] ← max
        xmax
'
ε
MGA(μ, xmax, xmin, ε, Sqr) = [3.26846; -0.405234; 0.985518; 0.28065; 1.65787; 0.185863; -2.96729; 59.6323; 13.912]
Opt(xmax, □, Sqr) =  # error: Пустой местозаполнитель.
x := [3.27; -0.41; 0.99; 0.28; 1.66; 0.19; -2.97; 59.63; 13.91]
dt := 1
λ := 0
u := 25
Tr := 2000
1.878*10^3/3600 = 0.521667
H := analizy(x, N, Tr, dt, λ, u, φ, CHIM, L, ΔRO, TIM, ASR)
# [area: Графики]
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H =  # no stored result
