φ(b) := ln(b + sqrt(b^2 + 1))
Shim(y_NS, y, CHIM, dt) :=
    "Это ШИМ"
    "yish - выход интегратора на текущем шаге"
    "yr - выход релейного элемента на текущем шаге"
    "y0 - выход интегратора на предыдущем шаге"
    "y1 - выход релейного элемента на предыдущем шаге"
    "CHIM - минимальная длительность импульса ШИМа,"
    "dt - шаг счета."
    "yNS - выход нейронной сети на текущем шаге(задаем перед блоком)"
    yish ← y[0] + dt*(y_NS - y[1])
    yr ← sign(yish)*1 if |yish| ≥ CHIM
    yr ← y[1] if |yish| < CHIM
    yr ← 0 if |yish| < .25*CHIM
    y ← [yish; yr]
HS(N, In, W, φ, y) :=
    "Это ИНС"
    X[0] ← y[0] + In[0]
    X[1] ← y[1] + In[1]
    for k ∈ 2 .. N - 1
        X[k] ← y[k]
    a ← transpose(W)*X
    for k ∈ 0 .. N - 1
        y[k] ← φ(a[k])
    y
ASR(N, Tr, dt, λ, u, φ, W, CHIM, L, ΔRO, TIM, HS, Shim, IM, object) :=
    "Y.j.1 -возмущение "
    "Y.j.2 -возмущение "
    "Y.j.3 -выход объекта "
    "Y.j.4 -выход нейронной сети "
    "Y.j.5 -выход ШИМ "
    "Y.j.6 -выход ИМ "
    "Задаем начальные условия объекта"
    g1 ← 0
    g2 ← 0
    for i ∈ 0 .. 3
        yob[i] ← 0
    "Задаем начальные условия нейронной сети"
    for i ∈ 0 .. N - 1
        yNS[i] ← 0
    "Задаем начальный вектор выходных значений АСР"
    for i ∈ 0 .. 10
        Y[0, i] ← 0
    "Задаем начальные условия для шима"
    for i ∈ 0 .. 1
        yshim[i] ← 0
    "Задаем начальные условия для има"
    yim ← 0
    "Задаем начальные условия для показателей качества"
    for i ∈ 0 .. 3
        I[i] ← 0
    In[0] ← 0
    In[1] ← 0
    b ← 0
    "Задаем цикл(переходный процесс замкнутой АСР"
    for j ∈ 1 .. Tr/dt
        "Задаем возмущение"
        Y[j, 1] ← if(j < 1, 0, λ)
        "Задаем задание"
        Y[j, 2] ← if(j < 1, 0, u)
        "Задаем счетчик"
        Y[j, 0] ← dt*j
        "Сигнал рассогласования"
        g1 ← Y[j, 2] - Y[j - 1, 3]
        g2 ← g1 - Y[j - 1, 10]
        In[0] ← g1 - sign(g1)*0.008
        In[0] ← 0 if |g1| ≤ 0.008
        In[1] ← g2 - sign(g2)*0.008
        In[1] ← 0 if |g2| ≤ 0.008
        "Отработка модуля нейронной сети"
        yNS ← HS(N, In, W, φ, yNS)
        "Выход нейронной сети"
        Y[j, 4] ← yNS[N - 1]
        yδ ← Y[j, 4]
        "Отработка модуля ШИМ"
        yshim ← Shim(yδ, yshim, CHIM, dt)
        " выход ШИМ"
        Y[j, 5] ← yshim[1]
        "Отработка модуля ИМ"
        yim ← IM(yim, yshim[1], dt, L, ΔRO, TIM)
        " выход ИМ"
        Y[j, 6] ← yim
        yλ ← Y[j, 1] + Y[j, 6]
        "Отработка модуля объекта"
        yob ← object(yob, yλ, dt)
        " выход Объекта"
        Y[j, 9] ← yob[3]
        Y[j, 8] ← yob[1]
        Y[j, 3] ← Y[j - 1, 3] if j ≤ floor(6.2/dt)
        Y[j, 3] ← Y[j - floor(6.2/dt), 8] otherwise
        Y[j, 10] ← Y[j - 1, 10] if j ≤ floor(0.4/dt)
        Y[j, 10] ← Y[j - floor(0.4/dt), 9] otherwise
        "Расчет интегральных критериев"
        I[0] ← I[0] + dt*Y[j, 3]
        I[1] ← I[1] + dt*Y[j, 3]^2
        I[2] ← I[2] + dt*|Y[j, 3]|
        I[3] ← I[3] + dt*|Y[j, 10]|
        "Поиск 1-й и 3-й амлитуд"
        if Y[j, 10] < Y[j - 1, 10] and b == 0
            A1 ← Y[j - 1, 10]
            b ← 1
        b ← 2 if Y[j, 10] > Y[j - 1, 10] and (b == 1)
        if Y[j, 10] < Y[j - 1, 10] and b == 2
            A3 ← Y[j - 1, 10]
            b ← 3
        b ← 4 if Y[j, 10] > Y[j - 1, 10] and (b == 3)
        if Y[j, 3] < Y[j - 1, 3] and c == 0
            B1 ← Y[j - 1, 3]
            c ← 1
        c ← 2 if Y[j, 3] > Y[j - 1, 3] and (c == 1)
        if Y[j, 3] < Y[j - 1, 3] and c == 2
            B3 ← Y[j - 1, 3]
            c ← 3
        c ← 4 if Y[j, 3] > Y[j - 1, 3] and (b == 3)
    Y[0, 7] ← I[0]
    Y[1, 7] ← I[1]
    Y[2, 7] ← I[2]
    Y[4, 7] ← B1
    Y[6, 7] ← I[3]
    Y[3, 7] ←
        0 if A1 == 0
        1 - A3/A1 otherwise
    Y[5, 7] ←
        0 if B1 == 0
        1 - B3/B1 otherwise
    Y[7, 7] ← A1
    Y
object(y, yμ, dt) :=
    "Это объект регулирования с передаточной функцией W(s)"
    A1 ← (1 - dt/11)*y[0] + 0.052*dt/11*yμ
    A2 ← (1 - dt/9.2)*y[1] + 1*dt/9.2*A1
    A3 ← (1 - dt/0.9)*y[2] + 0.025*dt/0.9*yμ
    A4 ← (1 - dt/0.7)*y[3] + 1*dt/0.7*A3
    y ← [A1; A2; A3; A4]
    y
IM(y, yr, dt, L, ΔRO, TIM) :=
    "Это ИМ"
    "TIM - Время полного оборота ИМ."
    "L - люфт"
    "ΔRO - ограничение РО."
    "yμ- выход ИМ на текущем шаге"
    "yr - выход релейного элемента на текущем шаге(задаем перед блоком)"
    "y- выход ИМ на предыдущем шаге"
    yμ ← y + dt*sign(yr)*100/TIM
    yμ ← sign(yμ)*ΔRO if |yμ| > ΔRO
    yμ ← yμ + L if yμ < y - L
    yμ ← yμ - L if yμ > y + L
    y ← yμ
    y
In[0] ← g1 - sign(g1)*0.3
In[0] ← 0 if |g1| ≤ 0.3
In[1] ← g2 - sign(g2)*0.15
In[1] ← 0 if |g2| ≤ 0.15
# g1[0] | g2[0]
yδ ← yNS[N - 1] - sign(yNS[N - 1])*0.1
yδ ← 0 if |yNS[N - 1]| ≤ 0.1
# In[0] | In[1]
0.25
Tr := 150
N := 6
dt := 0.1
λ := 1
u := 0
CHIM := 0.5
L := .01
ΔRO := 15
TIM := 100
analizy(x, N, Tr, dt, λ, u, φ, CHIM, L, ΔRO, TIM, ASR) :=
    "Программа передачи синоптических коэффициентов из вектора х в матрицу W"
    for k ∈ 0 .. N - 1
        for k1 ∈ 0 .. N - 1
            W[k, k1] ← 0
    W[0, 2] ← x[0]
    W[0, 3] ← x[1]
    W[0, 4] ← x[2]
    W[1, 2] ← x[3]
    W[1, 3] ← x[4]
    W[1, 4] ← x[5]
    W[2, 5] ← x[6]
    W[3, 5] ← x[7]
    W[4, 5] ← x[8]
    W[5, 3] ← x[9]
    H ← ASR(N, Tr, dt, λ, u, φ, W, CHIM, L, ΔRO, TIM, HS, Shim, IM, object)
    H
Sqr(x) :=
    "str1 - штраф на ограничения степени затухания"
    str1 ← 0
    str2 ← 0
    str3 ← 0
    str4 ← 0
    str5 ← 0
    H ← 0
    "Цикл работает по количеству весовых коэффициентов"
    for k ∈ 0 .. 9
        xf[k] ← x[k]
    H ← analizy(xf, N, Tr, dt, λ, u, φ, CHIM, L, ΔRO, TIM, ASR)
    str1 ← if(H[4, 7] > 0.02, 10^6, 0)
    str4 ← if(H[5, 7] > 0.95, 10^6, 0)
    str3 ← if(H[5, 7] < .85, 10^6, 0)
    I ← H[2, 7] + H[6, 7] + (str1 + str2 + str3 + str4 + str5)
    I
str3 ← if(H[5, 7] < .85, 10^6, 0)
str4 ← if(H[5, 7] > 0.95, 10^6, 0)
str1 ← if(H[3, 7] < .85, 10^6, 0)
str2 ← if(H[3, 7] > .95, 10^6, 0)
MGA(μ, xmax, xmin, ε, Sqr) :=
    z1 ← time(1)
    N ← length(xmax)
    m ← floor(((μ + N) + 1)/.9)
    for j ∈ 0 .. m
        for i ∈ 0 .. N - 1
            x[i, j] ← rnd(xmax[i] - xmin[i]) + xmin[i]
        x[N, j] ← Sqr(x[:, j])
    z ← 0
    x ← rsort(x, N)
    while 1/m*sum(|x[N, n] - x[N, 0]|, n = 0 .. m) > ε
        z ← z + 1
        r ← 0
        while r ≤ ceil(.1*m)
            r ← r + 1
            h ← 0
            while h == 0
                Mt ← 0
                for j ∈ 0 .. N
                    P[j] ← floor(rnd(.9*m))
                for j ∈ 1 .. N
                    for jj ∈ 0 .. j - 1
                        Mt ← 1 if P[jj] == P[j]
                h ← 1 if Mt == 0
            for j ∈ 0 .. N
                as[:, j] ← x[:, P[j]]
            k ← 0
            as ← rsort(as, N)
            while |as[N, N] - as[N, 0]| > ε
                a ← as
                for i ∈ 0 .. N - 1
                    a[i, N + 1] ← 1/N*(sum(a[i, j], j = 0 .. N) - a[i, N])
                    a[i, N + 2] ← a[i, N + 1] + 1.*(a[i, N + 1] - a[i, N])
                a[N, N + 2] ← Sqr(a[:, N + 2])
                if a[N, N + 2] ≤ a[N, 0]
                    for i ∈ 0 .. N - 1
                        a[i, N + 3] ← a[i, N + 1] + 2*(a[i, N + 2] - a[i, N + 1])
                    a[N, N + 3] ← Sqr(a[:, N + 3])
                    a[:, N] ← a[:, N + 3] if a[N, N + 3] ≤ a[N, 0]
                    a[:, N] ← a[:, N + 2] otherwise
                otherwise
                    a[:, N] ← a[:, N + 2] if a[N, N + 2] < a[N, N - 1]
                    a[:, N] ← a[:, N + 2] if a[N, N + 2] < a[N, N]
                    otherwise
                        for i ∈ 0 .. N - 1
                            a[i, N + 4] ← a[i, N + 1] + 0.5*(a[i, N] - a[i, N + 1])
                        a[N, N + 4] ← Sqr(a[:, N + 4])
                        if a[N, N + 4] ≥ a[N, N]
                            for j ∈ 1 .. N
                                for i ∈ 0 .. N - 1
                                    a[i, j] ← a[i, 0] + 0.5*(a[i, j] - a[i, 0])
                                a[N, j] ← Sqr(a[:, j])
                        a[:, N] ← a[:, N + 4] otherwise
                as ← 0
                for j ∈ 0 .. N
                    as[:, j] ← a[:, j]
                as ← rsort(as, N)
                k ← k + 1
                if k > 100*N
                    ads ← as[:, 0]
                    ads[N + 1] ← "Alarm Program stop in DM"
                    ads[N + 2] ← k
                    return ads
            x[:, floor(.9*m) + r] ← a[:, 0]
            x ← rsort(x, N)
            z2 ← time(1)
            Δt ← z2 - z1
            return x if z > 2*m
    xx ← x[:, 0]
    xx[N + 1] ← Δt
    xx
ε := 0.01
μ := 10
xmin := [-5; -5; -5; -5; -5; -5; -5; -5; -5; -5]
xmax := [5; 5; 5; 5; 5; 5; 5; 5; 5; 5]
ε
[8.95; -2.068; 1.439; -7.98; -2.148; -0.429; -6.259; -1.351; -5.041; 5.55]
[6.334; -2.583; 4.238; 2.329; 0.026; -5.122; 5.702; -0.126; -7.859; -2.304]
x := [6.334; -2.583; 4.238; 2.329; 0.026; -5.122; 5.702; -0.126; -7.859; -2.304]
MGA(μ, xmax, xmin, □, Sqr) =  # error: Пустой местозаполнитель.
'
# Тим=100
# чим=0.5
# 2 модуля
# ст.з по внеш
# дин.отк. по внеш
# Tим=50
# 2 модуля
# чим=0.8
# степень зат по внешнему
# дин откл по внешнему
ε
H := analizy(x, N, Tr, dt, λ, u, φ, CHIM, L, ΔRO, TIM, ASR)
Hch := READPRN("C:\Users\ruskig\Desktop\Science\H.txt")
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H =  # no stored result
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