q := READPRN("C:\Users\Igor\Desktop\\Krivaya30.trd")
a :=
    r ← q[0, 1]
    for i ∈ 1 .. rows(q) - 1
        if(q[i, 0] ≠ q[i - 1, 0], r ← augment(r, q[i, 1]), 0)
    r
b :=
    r ← q[0, 0]
    for i ∈ 1 .. rows(q) - 1
        if(q[i, 0] ≠ q[i - 1, 0], r ← augment(r, q[i, 0]), 0)
    r
c :=
    r ← q[0, 2]
    for i ∈ 1 .. rows(q) - 1
        if(q[i, 0] ≠ q[i - 1, 0], r ← augment(r, q[i, 2]), 0)
    r
q =  # no stored result
transpose(c) =  # no stored result
transpose(b) =  # no stored result
transpose(a) =  # no stored result
t := transpose(b) - transpose(b)[0]
v := max(transpose(c)) - min(transpose(c)) = 73.0162
t_vozm := 19
rows(t) = 1161
rows(transpose(a)) = 1161
v + transpose(a)[0] = 108.232
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min(transpose(a)) = 35.2154
ob := transpose(a)
φ(b) := (exp(b) - exp(-b))/(exp(b) + exp(-b))
dt := 1
φ(z, p) := (1 - dt/50)*z + dt/50*p
HS(N, In, W, φ, y) :=
    "Это ИНС"
    X[0] ← y[0] + In
    for k ∈ 1 .. N - 1
        X[k] ← y[k]
    a ← transpose(W)*X
    for k ∈ 0 .. N - 1
        y[k] ← φ(y[k], a[k])
    y
ob[0] = 35.2154
Tr := rows(t) - 1 = 1160
N := 4
v := 73
Sqr(x) :=
    for k ∈ 0 .. N - 1
        for k1 ∈ 0 .. N - 1
            W[k, k1] ← 0
    W[0, 1] ← x[0]
    W[0, 2] ← x[1]
    W[0, 3] ← x[2]
    W[0, 0] ← x[3]
    W[1, 0] ← x[4]
    W[1, 1] ← x[5]
    W[1, 2] ← x[6]
    W[1, 3] ← x[7]
    W[2, 0] ← x[8]
    W[2, 1] ← x[9]
    W[2, 2] ← x[10]
    W[2, 3] ← x[11]
    W[3, 0] ← x[12]
    W[3, 1] ← x[13]
    W[3, 2] ← x[14]
    W[3, 3] ← x[15]
    for i ∈ 0 .. N - 1
        yNS[i] ← 0
    Y[0, 0] ← 0
    for i ∈ 1 .. 2
        Y[0, i] ← ob[0]
    S ← 0
    for j ∈ 1 .. Tr/dt
        Y[j, 0] ← dt*j
        In ← if(j > 18, v, 0)
        yNS ← HS(N, In, W, φ, yNS)
        yNS[N - 1] ← if(j > 18, yNS[N - 1], ob[0])
        Y[j, 1] ← yNS[N - 1]
        yob ← ob[j]
        Y[j, 2] ← yob
        S ← S + (Y[j, 2] - Y[j, 1])^2
    S
In ← if(j > 18, v, 0)
MGA(μ, xmax, xmin, ε, Sqr) :=
    z1 ← time(1)
    N ← length(xmax)
    m ← floor(((μ + N) + 1)/.9)
    for j ∈ 0 .. m
        for i ∈ 0 .. N - 1
            x[i, j] ← rnd(xmax[i] - xmin[i]) + xmin[i]
        x[N, j] ← Sqr(x[:, j])
    z ← 0
    x ← rsort(x, N)
    while 1/m*sum(|x[N, n] - x[N, 0]|, n = 0 .. m) > ε
        z ← z + 1
        r ← 0
        while r ≤ ceil(.1*m)
            r ← r + 1
            h ← 0
            while h == 0
                Mt ← 0
                for j ∈ 0 .. N
                    P[j] ← floor(rnd(.9*m))
                for j ∈ 1 .. N
                    for jj ∈ 0 .. j - 1
                        Mt ← 1 if P[jj] == P[j]
                h ← 1 if Mt == 0
            for j ∈ 0 .. N
                as[:, j] ← x[:, P[j]]
            k ← 0
            as ← rsort(as, N)
            while |as[N, N] - as[N, 0]| > ε
                a ← as
                for i ∈ 0 .. N - 1
                    a[i, N + 1] ← 1/N*(sum(a[i, j], j = 0 .. N) - a[i, N])
                    a[i, N + 2] ← a[i, N + 1] + 1.*(a[i, N + 1] - a[i, N])
                a[N, N + 2] ← Sqr(a[:, N + 2])
                if a[N, N + 2] ≤ a[N, 0]
                    for i ∈ 0 .. N - 1
                        a[i, N + 3] ← a[i, N + 1] + 2*(a[i, N + 2] - a[i, N + 1])
                    a[N, N + 3] ← Sqr(a[:, N + 3])
                    a[:, N] ← a[:, N + 3] if a[N, N + 3] ≤ a[N, 0]
                    a[:, N] ← a[:, N + 2] otherwise
                otherwise
                    a[:, N] ← a[:, N + 2] if a[N, N + 2] < a[N, N - 1]
                    a[:, N] ← a[:, N + 2] if a[N, N + 2] < a[N, N]
                    otherwise
                        for i ∈ 0 .. N - 1
                            a[i, N + 4] ← a[i, N + 1] + 0.5*(a[i, N] - a[i, N + 1])
                        a[N, N + 4] ← Sqr(a[:, N + 4])
                        if a[N, N + 4] ≥ a[N, N]
                            for j ∈ 1 .. N
                                for i ∈ 0 .. N - 1
                                    a[i, j] ← a[i, 0] + 0.5*(a[i, j] - a[i, 0])
                                a[N, j] ← Sqr(a[:, j])
                        a[:, N] ← a[:, N + 4] otherwise
                as ← 0
                for j ∈ 0 .. N
                    as[:, j] ← a[:, j]
                as ← rsort(as, N)
                k ← k + 1
                if k > 1000*N
                    ads ← as[:, 0]
                    ads[N + 1] ← "Alarm Program stop in DM"
                    ads[N + 2] ← k
                    return ads
            x[:, floor(.9*m) + r] ← a[:, 0]
            x ← rsort(x, N)
            z2 ← time(1)
            Δt ← z2 - z1
            return x if z > 2*m
    xx ← x[:, 0]
    xx[N + 1] ← Δt
    xx
ε := 1
μ := 100
xmax :=
    for i ∈ 0 .. 16
        y[i] ← 1
    y
xmin :=
    for i ∈ 0 .. 16
        y[i] ← -1
    y
ε
[-0.144; -1.738; 0.018; -0.115; -1.633; 0.151; 0.506; 0.421; 0.531; 0.734; -1.642; -0.467; 0.693; -0.069; 0.158; 0.609; 1.478; 60.97; 198.853]
MGA(μ, xmax, xmin, □, Sqr) =  # error: Пустой местозаполнитель.
x := [1.132; 0.42; 0.313; 0.025; 0.542; -0.267; -0.673; 0.098; 0.107; -0.256; 0.305; 0.395; 0.036; -0.647; 0.573; 0.169; 0.528; 13.004; 235.406]
'
GRAF :=
    for k ∈ 0 .. N - 1
        for k1 ∈ 0 .. N - 1
            W[k, k1] ← 0
    W[0, 1] ← x[0]
    W[0, 2] ← x[1]
    W[0, 3] ← x[2]
    W[0, 0] ← x[3]
    W[1, 0] ← x[4]
    W[1, 1] ← x[5]
    W[1, 2] ← x[6]
    W[1, 3] ← x[7]
    W[2, 0] ← x[8]
    W[2, 1] ← x[9]
    W[2, 2] ← x[10]
    W[2, 3] ← x[11]
    W[3, 0] ← x[12]
    W[3, 1] ← x[13]
    W[3, 2] ← x[14]
    W[3, 3] ← x[15]
    for i ∈ 0 .. N - 1
        yNS[i] ← 0
    Y[0, 0] ← 0
    for i ∈ 1 .. 2
        Y[0, i] ← ob[0]
    for j ∈ 1 .. Tr/dt
        Y[j, 0] ← dt*j
        In ← if(j > 18, v, 0)
        yNS ← HS(N, In, W, φ, yNS)
        yNS[N - 1] ← if(j > 18, yNS[N - 1], ob[0])
        Y[j, 1] ← yNS[N - 1]
        yob ← ob[j]
        Y[j, 2] ← yob
    Y
ob[0] = 35.2154
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