dt := 0.1
φ(b) := (exp(b) - exp(-b))/(exp(b) + exp(-b))
φ(z, b) := (1 - dt/1)*z + dt/1*b  # функция активации нейрона
# Блок программы описывающий нейронную сеть
HS(N, In, W, φ, y) :=
    "Это ИНС"
    X[0] ← y[0] + In[0]
    X[1] ← y[1] + In[1]
    for k ∈ 2 .. N - 1
        X[k] ← y[k]
    a ← transpose(W)*X
    for k ∈ 0 .. N - 1
        y[k] ← φ(y[k], a[k])
    y
object(y, yμ_1, yμ_2, dt) :=
    "Это объект регулирования с передаточной функцией W(s)"
    A1 ← (1 - dt/5)*y[0] + 0.5*dt/5*yμ_1
    A2 ← (1 - dt/3)*y[1] + 1*dt/3*yμ_1
    A3 ← (1 - dt/2)*y[2] + 0.25*dt/2*yμ_2
    A4 ← (1 - dt/4)*y[3] + 1*dt/4*yμ_2
    y ← [A1; A2; A3; A4]
    y
# μ | λ
Tr := 50
N := 4
Sqr(x) :=
    for k ∈ 0 .. N - 1
        for k1 ∈ 0 .. N - 1
            W[k, k1] ← 0
    W[0, 1] ← x[0]
    W[0, 2] ← x[1]
    W[0, 3] ← x[2]
    W[0, 0] ← x[3]
    W[1, 0] ← x[4]
    W[1, 1] ← x[5]
    W[1, 2] ← x[6]
    W[1, 3] ← x[7]
    W[2, 0] ← x[8]
    W[2, 1] ← x[9]
    W[2, 2] ← x[10]
    W[2, 3] ← x[11]
    W[3, 0] ← x[12]
    W[3, 1] ← x[13]
    W[3, 2] ← x[14]
    W[3, 3] ← x[15]
    In[0] ← 1
    In[1] ← 1
    for i ∈ 0 .. N - 1
        yNS[i] ← 0
    for i ∈ 0 .. 3
        yob[i] ← 0
    for i ∈ 0 .. 8
        Y[0, i] ← 0
    S1 ← 0
    S2 ← 0
    for j ∈ 1 .. Tr/dt
        Y[j, 0] ← dt*j
        yNS ← HS(N, In, W, φ, yNS)
        Y[j, 1] ← yNS[N - 1]
        Y[j, 2] ← yNS[N - 2]
        yob ← object(yob, In[0], In[1], dt)
        Y[j, 3] ← yob[0]
        Y[j, 4] ← yob[2]
        Y[j, 5] ← Y[j - 1, 5] if j ≤ floor(0.25/dt)
        Y[j, 5] ← Y[j - floor(0.25/dt), 3] otherwise
        Y[j, 6] ← Y[j - 1, 6] if j ≤ floor(0.6/dt)
        Y[j, 6] ← Y[j - floor(0.6/dt), 2] otherwise
        Y[j, 7] ← yob[0] + yob[3]
        Y[j, 8] ← yob[2] + yob[1]
        S1 ← S1 + (Y[j, 1] - Y[j, 7])^2
        S2 ← S2 + (Y[j, 2] - Y[j, 8])^2
    S ← S1 + S2
MGA(μ, xmax, xmin, ε, Sqr) :=
    z1 ← time(1)
    N ← length(xmax)
    m ← floor(((μ + N) + 1)/.9)
    for j ∈ 0 .. m
        for i ∈ 0 .. N - 1
            x[i, j] ← rnd(xmax[i] - xmin[i]) + xmin[i]
        x[N, j] ← Sqr(x[:, j])
    z ← 0
    x ← rsort(x, N)
    while 1/m*sum(|x[N, n] - x[N, 0]|, n = 0 .. m) > ε
        z ← z + 1
        r ← 0
        while r ≤ ceil(.1*m)
            r ← r + 1
            h ← 0
            while h == 0
                Mt ← 0
                for j ∈ 0 .. N
                    P[j] ← floor(rnd(.9*m))
                for j ∈ 1 .. N
                    for jj ∈ 0 .. j - 1
                        Mt ← 1 if P[jj] == P[j]
                h ← 1 if Mt == 0
            for j ∈ 0 .. N
                as[:, j] ← x[:, P[j]]
            k ← 0
            as ← rsort(as, N)
            while |as[N, N] - as[N, 0]| > ε
                a ← as
                for i ∈ 0 .. N - 1
                    a[i, N + 1] ← 1/N*(sum(a[i, j], j = 0 .. N) - a[i, N])
                    a[i, N + 2] ← a[i, N + 1] + 1.*(a[i, N + 1] - a[i, N])
                a[N, N + 2] ← Sqr(a[:, N + 2])
                if a[N, N + 2] ≤ a[N, 0]
                    for i ∈ 0 .. N - 1
                        a[i, N + 3] ← a[i, N + 1] + 2*(a[i, N + 2] - a[i, N + 1])
                    a[N, N + 3] ← Sqr(a[:, N + 3])
                    a[:, N] ← a[:, N + 3] if a[N, N + 3] ≤ a[N, 0]
                    a[:, N] ← a[:, N + 2] otherwise
                otherwise
                    a[:, N] ← a[:, N + 2] if a[N, N + 2] < a[N, N - 1]
                    a[:, N] ← a[:, N + 2] if a[N, N + 2] < a[N, N]
                    otherwise
                        for i ∈ 0 .. N - 1
                            a[i, N + 4] ← a[i, N + 1] + 0.5*(a[i, N] - a[i, N + 1])
                        a[N, N + 4] ← Sqr(a[:, N + 4])
                        if a[N, N + 4] ≥ a[N, N]
                            for j ∈ 1 .. N
                                for i ∈ 0 .. N - 1
                                    a[i, j] ← a[i, 0] + 0.5*(a[i, j] - a[i, 0])
                                a[N, j] ← Sqr(a[:, j])
                        a[:, N] ← a[:, N + 4] otherwise
                as ← 0
                for j ∈ 0 .. N
                    as[:, j] ← a[:, j]
                as ← rsort(as, N)
                k ← k + 1
                if k > 1000*N
                    ads ← as[:, 0]
                    ads[N + 1] ← "Alarm Program stop in DM"
                    ads[N + 2] ← k
                    return ads
            x[:, floor(.9*m) + r] ← a[:, 0]
            x ← rsort(x, N)
            z2 ← time(1)
            Δt ← z2 - z1
            return x if z > 2*m
    xx ← x[:, 0]
    xx[N + 1] ← Δt
    xx
Opt(X0, ε, Sqr) :=
    z1 ← time(1)
    k ← 0
    N ← length(X0)
    as[:, 0] ← X0
    for j ∈ 1 .. N
        for i ∈ 0 .. N - 1
            as[i, j] ← X0[i] + 1/(N*sqrt(2))*(sqrt(N - 1) + N - 1) if j - 1 == i
            as[i, j] ← X0[i] + 1/(N*sqrt(2))*(sqrt(N - 1) - 1) otherwise
    for j ∈ 0 .. N
        as[N, j] ← Sqr(as[:, j])
    as ← rsort(as, N)
    while |as[N, N] - as[N, 0]| > ε
        a ← as
        for i ∈ 0 .. N - 1
            a[i, N + 1] ← 1/N*(sum(a[i, j], j = 0 .. N) - a[i, N])
            a[i, N + 2] ← a[i, N + 1] + 1*(a[i, N + 1] - a[i, N])
        a[N, N + 2] ← Sqr(a[:, N + 2])
        if a[N, N + 2] ≤ a[N, 0]
            for i ∈ 0 .. N - 1
                a[i, N + 3] ← a[i, N + 1] + 2*(a[i, N + 2] - a[i, N + 1])
            a[N, N + 3] ← Sqr(a[:, N + 3])
            a[:, N] ← a[:, N + 3] if a[N, N + 3] ≤ a[N, 0]
            a[:, N] ← a[:, N + 2] otherwise
        otherwise
            a[:, N] ← a[:, N + 2] if a[N, N + 2] < a[N, N - 1]
            otherwise
                a[:, N] ← a[:, N + 2] if a[N, N + 2] < a[N, N]
                for i ∈ 0 .. N - 1
                    a[i, N + 4] ← a[i, N + 1] + 0.5*(a[i, N] - a[i, N + 1])
                a[N, N + 4] ← Sqr(a[:, N + 4])
                if a[N, N + 4] ≥ a[N, N]
                    for j ∈ 1 .. N
                        for i ∈ 0 .. N - 1
                            a[i, j] ← a[i, 0] + 0.5*(a[i, j] - a[i, 0])
                        a[N, j] ← Sqr(a[:, j])
                a[:, N] ← a[:, N + 4] otherwise
        as ← 0
        for j ∈ 0 .. N
            as[:, j] ← a[:, j]
        as ← rsort(as, N)
        k ← k + 1
        if k > 500*N
            ads ← as[:, 0]
            ads[N + 1] ← "Alarm Program stop"
            ads[N + 2] ← k
            return ads
    ao ← as[:, 0]
    z2 ← time(2)
    Δt ← z2 - z1
    ao[N + 1] ← Δt
    ao
ε := 0.000001
μ := 30
xmax :=
    for i ∈ 0 .. 16
        y[i] ← 1
    y
xmin :=
    for i ∈ 0 .. 16
        y[i] ← -1
    y
MGA(μ, xmax, xmin, ε, Sqr) = [-0.0851205; 0.0612552; -0.15016; 0.767165; 0.255644; 0.330814; 0.401326; 0.500675; -1.51018; 1.21674; -0.537531; 0.478333; 0.350162; -1.2471; 1.02433; 0.215343; -0.717115; 5.13222e-5; 74.693]
ε
'
x := [
    -0.085;
    0.061;
    -0.15;
    0.767;
    0.256;
    0.331;
    0.401;
    0.501;
    -1.51;
    1.217;
    -0.538;
    0.478;
    0.35;
    -1.247;
    1.024;
    0.215;
    -0.717;
    5.132*10^-5;
    74.693
]
Opt(xmax, □, Sqr) =  # error: Пустой местозаполнитель.
GRAF :=
    for k ∈ 0 .. N - 1
        for k1 ∈ 0 .. N - 1
            W[k, k1] ← 0
    W[0, 1] ← x[0]
    W[0, 2] ← x[1]
    W[0, 3] ← x[2]
    W[0, 0] ← x[3]
    W[1, 0] ← x[4]
    W[1, 1] ← x[5]
    W[1, 2] ← x[6]
    W[1, 3] ← x[7]
    W[2, 0] ← x[8]
    W[2, 1] ← x[9]
    W[2, 2] ← x[10]
    W[2, 3] ← x[11]
    W[3, 0] ← x[12]
    W[3, 1] ← x[13]
    W[3, 2] ← x[14]
    W[3, 3] ← x[15]
    In[0] ← 1
    In[1] ← 1
    for i ∈ 0 .. N - 1
        yNS[i] ← 0
    for i ∈ 0 .. 3
        yob[i] ← 0
    for i ∈ 0 .. 8
        Y[0, i] ← 0
    S1 ← 0
    S2 ← 0
    for j ∈ 1 .. Tr/dt
        Y[j, 0] ← dt*j
        yNS ← HS(N, In, W, φ, yNS)
        Y[j, 1] ← yNS[N - 1]
        Y[j, 2] ← yNS[N - 2]
        yob ← object(yob, In[0], In[1], dt)
        Y[j, 3] ← yob[0]
        Y[j, 4] ← yob[2]
        Y[j, 5] ← Y[j - 1, 5] if j ≤ floor(1/dt)
        Y[j, 5] ← Y[j - floor(1/dt), 3] otherwise
        Y[j, 6] ← Y[j - 1, 6] if j ≤ floor(1/dt)
        Y[j, 6] ← Y[j - floor(1/dt), 2] otherwise
        Y[j, 7] ← yob[0] + yob[3]
        Y[j, 8] ← yob[2] + yob[1]
    Y
WRITEPRN("C:\Users\ruskig\Desktop\Science\GRAPH\A(k=2, T=2.89).txt") := GRAF  # error: No such file or directory
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GRAF =  # no stored result
