# [area: ФА и ИНС]
φ(b) := ln(b + sqrt(b^2 + 1))
HS(N, In, W, φ, y, x) :=
    "Это ИНС"
    y[0] ← In[0]
    y[1] ← In[1]
    y[2] ← In[2]
    y[3] ← φ(y[0]*x[0] + y[1]*x[1] + y[2]*x[2])
    y[4] ← φ(y[0]*x[3] + y[1]*x[4] + y[2]*x[5])
    y[5] ← φ(y[0]*x[6] + y[1]*x[7] + y[2]*x[8])
    y[6] ← φ(y[3]*x[9] + y[4]*x[10] + y[5]*x[11] + y[6]*x[18])
    y[7] ← φ(y[3]*x[12] + y[4]*x[13] + y[5]*x[14] + y[6]*x[19])
    y[8] ← φ(y[3]*x[15] + y[4]*x[16] + y[5]*x[17] + y[6]*x[20])
    y
# [area: ШИМ]
Shim(y_NS, y, CHIM, dt) :=
    yish ← y[0] + dt*(y_NS - y[1])
    yr ← sign(yish)*1 if |yish| ≥ CHIM
    yr ← y[1] if |yish| < CHIM
    yr ← 0 if |yish| < 0.5*CHIM
    y ← [yish; yr]
# [area: ИМ]
IM(y, yr, dt, L, ΔRO, TIM) :=
    yμ ← y + dt*sign(yr)*100/TIM
    yμ ← sign(yμ)*ΔRO if |yμ| > ΔRO
    y ← yμ
    y
# [area: Объект]
object(y, yμ_1, yμ_2, yμ_3, dt) :=
    "Это объект регулирования с передаточной функцией W(s)"
    A1 ← (1 - dt/5)*y[0] + 0.5*dt/5*yμ_1
    B1 ← (1 - dt/3)*y[1] + 1*dt/3*yμ_2
    C1 ← (1 - dt/2)*y[2] + 0.25*dt/2*yμ_3
    A2 ← (1 - dt/4)*y[3] + 2*dt/4*yμ_1
    B2 ← (1 - dt/5)*y[4] + 4*dt/4*yμ_2
    C2 ← (1 - dt/7)*y[5] + 1.5*dt/4*yμ_3
    A3 ← (1 - dt/4)*y[6] + 3*dt/4*yμ_1
    B3 ← (1 - dt/8)*y[7] + 0.75*dt/4*yμ_2
    C3 ← (1 - dt/3)*y[8] + 2.5*dt/4*yμ_3
    y ← [A1; B1; C1; A2; B2; C2; A3; B3; C3]
    y
# [area: АСР]
ASR(N, Tr, dt, λ_1, λ_2, λ_3, u_1, u_2, u_3, φ, W, CHIM, L, ΔRO, TIM, HS, Shim, IM, object, x) :=
    for i ∈ 0 .. 8
        yob[i] ← 0
    "Задаем начальные условия нейронной сети"
    for i ∈ 0 .. N - 1
        yNS[i] ← 0
    "Задаем начальный вектор выходных значений АСР"
    for i ∈ 0 .. 22
        Y[0, i] ← 0
    "Задаем начальные условия для шима"
    for i ∈ 0 .. 1
        yshim_1[i] ← 0
        yshim_2[i] ← 0
        yshim_3[i] ← 0
    "Задаем начальные условия для има"
    yim_1 ← 0
    yim_2 ← 0
    yim_3 ← 0
    "Задаем начальные условия для показателей качества"
    for i ∈ 0 .. 3
        I_1[i] ← 0
        I_2[i] ← 0
        I_3[i] ← 0
    "Задаем цикл АСР"
    for j ∈ 1 .. Tr/dt
        "Задаем возмущение"
        Y[j, 1] ← λ_1
        Y[j, 2] ← λ_2
        Y[j, 3] ← λ_3
        "Задаем задание"
        Y[j, 4] ← u_1
        Y[j, 5] ← u_2
        Y[j, 6] ← u_3
        "Задаем счетчик"
        Y[j, 0] ← dt*j
        "Сигнал рассогласования"
        In[0] ← Y[j, 4] - Y[j - 1, 16]
        In[1] ← Y[j, 5] - Y[j - 1, 17]
        In[2] ← Y[j, 6] - Y[j - 1, 18]
        Y[j, 19] ← In[0]
        Y[j, 20] ← In[1]
        Y[j, 21] ← In[2]
        "Отработка модуля нейронной сети"
        yNS ← HS(N, In, W, φ, yNS, x)
        "Выход нейронной сети"
        Y[j, 7] ← yNS[N - 1]
        Y[j, 8] ← yNS[N - 2]
        Y[j, 9] ← yNS[N - 3]
        yδ_1 ← Y[j, 7]
        yδ_2 ← Y[j, 8]
        yδ_3 ← Y[j, 9]
        "Отработка модуля ШИМ"
        yshim_1 ← Shim(yδ_1, yshim_1, CHIM, dt)
        yshim_2 ← Shim(yδ_2, yshim_2, CHIM, dt)
        yshim_3 ← Shim(yδ_3, yshim_3, CHIM, dt)
        " выход ШИМ"
        Y[j, 10] ← yshim_1[1]
        Y[j, 11] ← yshim_2[1]
        Y[j, 12] ← yshim_3[1]
        "Отработка модуля ИМ"
        yim_1 ← IM(yim_1, yshim_1[1], dt, L, ΔRO, TIM)
        yim_2 ← IM(yim_2, yshim_2[1], dt, L, ΔRO, TIM)
        yim_3 ← IM(yim_3, yshim_3[1], dt, L, ΔRO, TIM)
        " выход ИМ"
        Y[j, 13] ← yim_1
        Y[j, 14] ← yim_2
        Y[j, 15] ← yim_3
        yλ_1 ← Y[j, 1] + Y[j, 13]
        yλ_2 ← Y[j, 2] + Y[j, 14]
        yλ_3 ← Y[j, 3] + Y[j, 15]
        "Отработка модуля объекта"
        yob ← object(yob, yλ_1, yλ_2, yλ_3, dt)
        " выход Объекта"
        Y[j, 16] ← yob[0] + yob[1] + yob[2]
        Y[j, 17] ← yob[3] + yob[4] + yob[5]
        Y[j, 18] ← yob[6] + yob[7] + yob[8]
        "Расчет интегральных критериев"
        I_1[2] ← I_1[2] + dt*|Y[j, 19]|
        I_2[2] ← I_2[2] + dt*|Y[j, 20]|
        I_3[2] ← I_3[2] + dt*|Y[j, 21]|
    Y[0, 22] ← I_1[2]
    Y[1, 22] ← I_2[2]
    Y[2, 22] ← I_3[2]
    Y
# [area: Структура ИНС]
analizy(x, N, Tr, dt, λ_1, λ_2, λ_3, u_1, u_2, u_3, φ, CHIM, L, ΔRO, TIM, ASR) :=
    H ← ASR(N, Tr, dt, λ_1, λ_2, λ_3, u_1, u_2, u_3, φ, W, CHIM, L, ΔRO, TIM, HS, Shim, IM, object, x)
    H
# [area: Параметры + Функция цели]
λ_3 := 0
Tr := 200
N := 9
dt := 0.1
λ_1 := 0
λ_2 := 0
u_1 := 1
u_2 := 1
CHIM := 1
L := .01
ΔRO := 100
TIM := 500
u_3 := 1
Sqr(x) :=
    H ← 0
    "Цикл работает по количеству весовых коэффициентов"
    for k ∈ 0 .. 20
        xf[k] ← x[k]
    H ← analizy(xf, N, Tr, dt, λ_1, λ_2, λ_3, u_1, u_2, u_3, φ, CHIM, L, ΔRO, TIM, ASR)
    I ← H[0, 22] + H[1, 22] + H[2, 22]
    I
str3 ← if(H[5, 7] < .85, 10^6, 0)
str2 ← if(H[4, 19] < .85, 10^6, 0)
str1 ← if(H[5, 7] < .85, 10^6, 0)
# [area: OPT+ MGA]
MGA(μ, xmax, xmin, ε, Sqr) :=
    z1 ← time(1)
    N ← length(xmax)
    m ← floor(((μ + N) + 1)/.9)
    for j ∈ 0 .. m
        for i ∈ 0 .. N - 1
            x[i, j] ← rnd(xmax[i] - xmin[i]) + xmin[i]
        x[N, j] ← Sqr(x[:, j])
    z ← 0
    x ← rsort(x, N)
    while 1/m*sum(|x[N, n] - x[N, 0]|, n = 0 .. m) > ε
        z ← z + 1
        r ← 0
        while r ≤ ceil(.1*m)
            r ← r + 1
            h ← 0
            while h == 0
                Mt ← 0
                for j ∈ 0 .. N
                    P[j] ← floor(rnd(.9*m))
                for j ∈ 1 .. N
                    for jj ∈ 0 .. j - 1
                        Mt ← 1 if P[jj] == P[j]
                h ← 1 if Mt == 0
            for j ∈ 0 .. N
                as[:, j] ← x[:, P[j]]
            k ← 0
            as ← rsort(as, N)
            while |as[N, N] - as[N, 0]| > ε
                a ← as
                for i ∈ 0 .. N - 1
                    a[i, N + 1] ← 1/N*(sum(a[i, j], j = 0 .. N) - a[i, N])
                    a[i, N + 2] ← a[i, N + 1] + 1.*(a[i, N + 1] - a[i, N])
                a[N, N + 2] ← Sqr(a[:, N + 2])
                if a[N, N + 2] ≤ a[N, 0]
                    for i ∈ 0 .. N - 1
                        a[i, N + 3] ← a[i, N + 1] + 2*(a[i, N + 2] - a[i, N + 1])
                    a[N, N + 3] ← Sqr(a[:, N + 3])
                    a[:, N] ← a[:, N + 3] if a[N, N + 3] ≤ a[N, 0]
                    a[:, N] ← a[:, N + 2] otherwise
                otherwise
                    a[:, N] ← a[:, N + 2] if a[N, N + 2] < a[N, N - 1]
                    a[:, N] ← a[:, N + 2] if a[N, N + 2] < a[N, N]
                    otherwise
                        for i ∈ 0 .. N - 1
                            a[i, N + 4] ← a[i, N + 1] + 0.5*(a[i, N] - a[i, N + 1])
                        a[N, N + 4] ← Sqr(a[:, N + 4])
                        if a[N, N + 4] ≥ a[N, N]
                            for j ∈ 1 .. N
                                for i ∈ 0 .. N - 1
                                    a[i, j] ← a[i, 0] + 0.5*(a[i, j] - a[i, 0])
                                a[N, j] ← Sqr(a[:, j])
                        a[:, N] ← a[:, N + 4] otherwise
                as ← 0
                for j ∈ 0 .. N
                    as[:, j] ← a[:, j]
                as ← rsort(as, N)
                k ← k + 1
                if k > 100*N
                    ads ← as[:, 0]
                    ads[N + 1] ← "Alarm Program stop in DM"
                    ads[N + 2] ← k
                    return ads
            x[:, floor(.9*m) + r] ← a[:, 0]
            x ← rsort(x, N)
            z2 ← time(1)
            Δt ← z2 - z1
            return x if z > 2*m
    xx ← x[:, 0]
    xx[N + 1] ← Δt
    xx
Opt(X0, ε, Sqr) :=
    z1 ← time(1)
    k ← 0
    N ← length(X0)
    as[:, 0] ← X0
    for j ∈ 1 .. N
        for i ∈ 0 .. N - 1
            as[i, j] ← X0[i] + 1/(N*sqrt(2))*(sqrt(N - 1) + N - 1) if j - 1 == i
            as[i, j] ← X0[i] + 1/(N*sqrt(2))*(sqrt(N - 1) - 1) otherwise
    for j ∈ 0 .. N
        as[N, j] ← Sqr(as[:, j])
    as ← rsort(as, N)
    while |as[N, N] - as[N, 0]| > ε
        a ← as
        for i ∈ 0 .. N - 1
            a[i, N + 1] ← 1/N*(sum(a[i, j], j = 0 .. N) - a[i, N])
            a[i, N + 2] ← a[i, N + 1] + 1*(a[i, N + 1] - a[i, N])
        a[N, N + 2] ← Sqr(a[:, N + 2])
        if a[N, N + 2] ≤ a[N, 0]
            for i ∈ 0 .. N - 1
                a[i, N + 3] ← a[i, N + 1] + 2*(a[i, N + 2] - a[i, N + 1])
            a[N, N + 3] ← Sqr(a[:, N + 3])
            a[:, N] ← a[:, N + 3] if a[N, N + 3] ≤ a[N, 0]
            a[:, N] ← a[:, N + 2] otherwise
        otherwise
            a[:, N] ← a[:, N + 2] if a[N, N + 2] < a[N, N - 1]
            otherwise
                a[:, N] ← a[:, N + 2] if a[N, N + 2] < a[N, N]
                for i ∈ 0 .. N - 1
                    a[i, N + 4] ← a[i, N + 1] + 0.5*(a[i, N] - a[i, N + 1])
                a[N, N + 4] ← Sqr(a[:, N + 4])
                if a[N, N + 4] ≥ a[N, N]
                    for j ∈ 1 .. N
                        for i ∈ 0 .. N - 1
                            a[i, j] ← a[i, 0] + 0.5*(a[i, j] - a[i, 0])
                        a[N, j] ← Sqr(a[:, j])
                a[:, N] ← a[:, N + 4] otherwise
        as ← 0
        for j ∈ 0 .. N
            as[:, j] ← a[:, j]
        as ← rsort(as, N)
        k ← k + 1
        if k > 500*N
            ads ← as[:, 0]
            ads[N + 1] ← "Alarm Program stop"
            ads[N + 2] ← k
            return ads
    ao ← as[:, 0]
    z2 ← time(2)
    Δt ← z2 - z1
    ao[N + 1] ← Δt
    ao
# [area: Оптимизация]
ε := 0.01
μ := 25
k := 20
min := -5
max := 5
xmin :=
    for i ∈ 0 .. k
        xmin[i] ← min
        xmin
xmax :=
    for i ∈ 0 .. k
        xmax[i] ← max
        xmax
'
ε
Opt(xmax, □, Sqr) =  # error: Пустой местозаполнитель.
MGA(μ, xmax, xmin, ε, Sqr) = [0.560744; -2.41283; 3.22485; -2.95133; 0.472535; -0.390567; 0.330245; 0.118109; -5.60455; 2.58688; 6.17019; -1.59327; -2.63768; -0.371769; 0.144399; 1.65243; -1.24971; -2.13663; -6.12595; -3.45576; -3.44839; 42.5511; 1404.9]
x := [
    0.561;
    -2.413;
    3.225;
    -2.951;
    0.473;
    -0.391;
    0.33;
    0.118;
    -5.605;
    2.587;
    6.17;
    -1.593;
    -2.638;
    -0.372;
    0.144;
    1.652;
    -1.25;
    -2.137;
    -6.126;
    -3.456;
    -3.448;
    42.551;
    1.405*10^3
]
dt := 0.1
Tr := 2000
λ_1 := -7
λ_2 := 5
u_1 := 1
u_3 := 5
λ_3 := 10
u_2 := 7
1.878*10^3/3600 = 0.521667
H := analizy(x, N, Tr, dt, λ_1, λ_2, λ_3, u_1, u_2, u_3, φ, CHIM, L, ΔRO, TIM, ASR)
# [area: Графики]
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H =  # no stored result
