regul(k, dt, y, x) :=
    k*dt*x + y
    y
object(dt, y, μ2, μ1, λ) :=
    A1 ← dt*0.5*y[1] + dt*2*μ1 - dt*2*μ2 + y[0] - dt*0.625*y[0]
    A2 ← dt*0.5*y[0] - dt*y[1] + dt*2*μ2 - dt*2*λ + y[1]
    y ← [A1; A2]
    y
process(k1, k2, Tr, dt, λ, u1, u2, regul, object) :=
    for i ∈ 0 .. 8
        Y[0, i] ← 0
    for i ∈ 0 .. 1
        In[i] ← 0
    for i ∈ 0 .. 1
        ob[i] ← 0
    μ1 ← 0
    μ2 ← 0
    for i ∈ 1 .. Tr/dt
        Y[i, 0] ← i*dt
        Y[i, 1] ← u1
        Y[i, 2] ← u2
        In[0] ← Y[i, 1] - Y[i - 1, 7]
        In[1] ← Y[i, 2] - Y[i - 1, 8]
        Y[i, 3] ← In[0]
        Y[i, 4] ← In[1]
        μ1 ← k1*dt*In[0] + μ1
        Y[i, 5] ← μ1
        μ2 ← k2*dt*In[1] + μ2
        Y[i, 6] ← μ2
        ob ← object(dt, ob, μ2, μ1, λ)
        Y[i, 7] ← ob[0]
        Y[i, 8] ← ob[1]
    Y
[dy_1/dt == 0.5*y_2 + 2*μ1 - 2*μ2 - 0.625*y_1; dy_2/dt == 0.5*y_1 - y_2 + 2*μ2 - 2*λ]
R := READPRN("C:\\Users\\ruskig\\Desktop\R.txt")
k1 := 0.015
k2 := 2.447
Tr := 200
dt := 0.1
λ := 4
u1 := 50
u2 := 30
H := process(k1, k2, Tr, dt, λ, u1, u2, regul, object)
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H =  # no stored result
R =  # no stored result
