object(dt, y, μ2, μ1, λ) :=
    A1 ← dt*0.5*y[1] + dt*2*μ1 - dt*2*μ2 + y[0] - dt*0.625*y[0]
    A2 ← dt*0.5*y[0] - dt*y[1] + dt*2*μ2 - dt*2*λ + y[1]
    y ← [A1; A2]
    y
'
φ(b) := ln(b + sqrt(b^2 + 1))
HS(N, In, W, φ, y, x) :=
    "Это ИНС"
    y[0] ← In[0]
    y[1] ← In[1]
    y[2] ← y[0]*x[0] + y[1]*x[1]
    y[3] ← y[0]*x[2] + y[1]*x[3]
    y[4] ← y[0]*x[4] + y[1]*x[5]
    y[5] ← y[2]*x[6] + y[3]*x[7] + y[4]*x[8] + y[5]*x[12]
    y[6] ← y[2]*x[9] + y[3]*x[10] + y[4]*x[11] + y[6]*x[13]
    y
process(Tr, dt, λ, u1, u2, HS, N, W, φ, object, x) :=
    for i ∈ 0 .. 9
        Y[0, i] ← 0
    for i ∈ 0 .. 1
        In[i] ← 0
    for i ∈ 0 .. 1
        ob[i] ← 0
    for i ∈ 0 .. N - 1
        y_NS[i] ← 0
    b ← 0
    c ← 0
    for i ∈ 1 .. Tr/dt
        Y[i, 0] ← i*dt
        Y[i, 1] ← u1
        Y[i, 2] ← u2
        In[0] ← (Y[i, 1] - Y[i - 1, 7])
        In[1] ← (Y[i, 2] - Y[i - 1, 8])
        Y[i, 3] ← In[0]
        Y[i, 4] ← In[1]
        y_NS ← HS(N, In, W, φ, y_NS, x)
        Y[i, 5] ← y_NS[N - 2]
        Y[i, 6] ← y_NS[N - 1]
        ob ← object(dt, ob, y_NS[N - 1], y_NS[N - 2], λ)
        Y[i, 7] ← ob[0]
        Y[i, 8] ← ob[1]
        I_1 ← I_1 + dt*|Y[i, 3]|
        I_2 ← I_2 + dt*|Y[i, 4]|
        if Y[i, 7] < Y[i - 1, 7] and b == 0
            A1 ← Y[i - 1, 7]
            b ← 1
        b ← 2 if Y[i, 7] > Y[i - 1, 7] and (b == 1)
        if Y[i, 7] < Y[i - 1, 7] and b == 2
            A3 ← Y[i - 1, 7]
            b ← 3
        b ← 4 if Y[i, 7] > Y[i - 1, 7] and (b == 3)
        if Y[i, 8] < Y[i - 1, 8] and c == 0
            B1 ← Y[i - 1, 8]
            c ← 1
        c ← 2 if Y[i, 8] > Y[i - 1, 8] and (c == 1)
        if Y[i, 8] < Y[i - 1, 8] and c == 2
            B3 ← Y[i - 1, 8]
            c ← 3
        c ← 4 if Y[i, 8] > Y[i - 1, 8] and (c == 3)
    Y[0, 9] ← I_1
    Y[1, 9] ← I_2
    Y[2, 9] ← A1
    Y[3, 9] ← B1
    Y[4, 9] ←
        0 if A1 == 0
        1 - A3/A1 otherwise
    Y[5, 9] ←
        0 if B1 == 0
        1 - B3/B1 otherwise
    Y
analizy(x, Tr, dt, λ, u1, u2, N, φ, process) :=
    H ← process(Tr, dt, λ, u1, u2, HS, N, W, φ, object, x)
    H
N := 7
Tr := 20
dt := 0.1
λ := -0.1
u1 := 0
u2 := 0
Sqr(x) :=
    str1 ← 0
    str2 ← 0
    H ← 0
    for k ∈ 0 .. 13
        xf[k] ← x[k]
    H ← analizy(xf, Tr, dt, λ, u1, u2, N, φ, process)
    I ← H[0, 9] + H[1, 9]
    I
MGA(μ, xmax, xmin, ε, Sqr) :=
    z1 ← time(1)
    N ← length(xmax)
    m ← floor(((μ + N) + 1)/.9)
    for j ∈ 0 .. m
        for i ∈ 0 .. N - 1
            x[i, j] ← rnd(xmax[i] - xmin[i]) + xmin[i]
        x[N, j] ← Sqr(x[:, j])
    z ← 0
    x ← rsort(x, N)
    while 1/m*sum(|x[N, n] - x[N, 0]|, n = 0 .. m) > ε
        z ← z + 1
        r ← 0
        while r ≤ ceil(.1*m)
            r ← r + 1
            h ← 0
            while h == 0
                Mt ← 0
                for j ∈ 0 .. N
                    P[j] ← floor(rnd(.9*m))
                for j ∈ 1 .. N
                    for jj ∈ 0 .. j - 1
                        Mt ← 1 if P[jj] == P[j]
                h ← 1 if Mt == 0
            for j ∈ 0 .. N
                as[:, j] ← x[:, P[j]]
            k ← 0
            as ← rsort(as, N)
            while |as[N, N] - as[N, 0]| > ε
                a ← as
                for i ∈ 0 .. N - 1
                    a[i, N + 1] ← 1/N*(sum(a[i, j], j = 0 .. N) - a[i, N])
                    a[i, N + 2] ← a[i, N + 1] + 1.*(a[i, N + 1] - a[i, N])
                a[N, N + 2] ← Sqr(a[:, N + 2])
                if a[N, N + 2] ≤ a[N, 0]
                    for i ∈ 0 .. N - 1
                        a[i, N + 3] ← a[i, N + 1] + 2*(a[i, N + 2] - a[i, N + 1])
                    a[N, N + 3] ← Sqr(a[:, N + 3])
                    a[:, N] ← a[:, N + 3] if a[N, N + 3] ≤ a[N, 0]
                    a[:, N] ← a[:, N + 2] otherwise
                otherwise
                    a[:, N] ← a[:, N + 2] if a[N, N + 2] < a[N, N - 1]
                    a[:, N] ← a[:, N + 2] if a[N, N + 2] < a[N, N]
                    otherwise
                        for i ∈ 0 .. N - 1
                            a[i, N + 4] ← a[i, N + 1] + 0.5*(a[i, N] - a[i, N + 1])
                        a[N, N + 4] ← Sqr(a[:, N + 4])
                        if a[N, N + 4] ≥ a[N, N]
                            for j ∈ 1 .. N
                                for i ∈ 0 .. N - 1
                                    a[i, j] ← a[i, 0] + 0.5*(a[i, j] - a[i, 0])
                                a[N, j] ← Sqr(a[:, j])
                        a[:, N] ← a[:, N + 4] otherwise
                as ← 0
                for j ∈ 0 .. N
                    as[:, j] ← a[:, j]
                as ← rsort(as, N)
                k ← k + 1
                if k > 10000*N
                    ads ← as[:, 0]
                    ads[N + 1] ← "Alarm Program stop in DM"
                    ads[N + 2] ← k
                    return ads
            x[:, floor(.9*m) + r] ← a[:, 0]
            x ← rsort(x, N)
            z2 ← time(1)
            Δt ← z2 - z1
            return x if z > 2*m
    xx ← x[:, 0]
    xx[N + 1] ← Δt
    xx
ε := 0.01
μ := 30
k := 13
min := -5
max := 5
xmin :=
    for i ∈ 0 .. k
        xmin[i] ← min
        xmin
xmax :=
    for i ∈ 0 .. k
        xmax[i] ← max
        xmax
ε
MGA(μ, xmax, xmin, ε, Sqr) = [-0.991154; -0.980877; 2.56413; -5.64062; -1.90891; 1.06335; 2.06717; -2.27536; 1.35702; 2.8247; -1.97144; 3.59536; 0.934751; 0.931273; 0.0213928; 5.77]
x := [-0.991; -0.981; 2.564; -5.641; -1.909; 1.063; 2.067; -2.275; 1.357; 2.825; -1.971; 3.595; 0.935; 0.931; 0.021; 5.77]
ε
dt := 0.0001
λ := 4
u1 := 50
u2 := 30
H := analizy(x, Tr, dt, λ, u1, u2, N, φ, process)
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R := WRITEPRN("C:\\Users\\ruskig\\Desktop\R.txt", H)
H =  # no stored result
