к
φ(b) := ln(b + sqrt(b^2 + 1))
object(y, yμ, dt) :=
    "Это объект регулирования с передаточной функцией W(s)"
    A1 ← (1 - dt/130)*y[0] + 0.65*dt/130*yμ
    A2 ← (1 - dt/15)*y[1] + 1*dt/15*A1
    y ← [A1; A2]
    y
HS(N, In, W, φ, y, x) :=
    "Это ИНС"
    y[0] ← In[0]
    y[1] ← In[1]
    y[2] ← φ(y[0]*x[0] + y[1]*x[1])
    y[3] ← φ(y[0]*x[2] + y[1]*x[3])
    y[4] ← φ(y[2]*x[4] + y[3]*x[5] + y[4]*x[7])
    y
Shim(y_NS, y, CHIM, dt, x) :=
    yish ← y[0] + dt*(y_NS - y[1])
    yr ← sign(yish)*1 if |yish| ≥ CHIM
    yr ← y[1] if |yish| < CHIM
    yr ← 0 if |yish| < x[8]*CHIM
    y ← [yish; yr]
IM(y, yr, dt, L, ΔRO, TIM) :=
    yμ ← y + dt*sign(yr)*100/TIM
    yμ ← ΔRO if yμ > ΔRO
    yμ ← 0 if yμ < 0
    yμ ← yμ + L if yμ < y - L
    yμ ← yμ - L if yμ > y + L
    y ← yμ
    y
ASR(N, Tr, dt, λ, u, φ, W, CHIM, L, ΔRO, TIM, HS, Shim, IM, object, x) :=
    "Задаем начальные условия объекта"
    g1 ← 0
    g2 ← 0
    for i ∈ 0 .. 3
        yob[i] ← 0
    "Задаем начальные условия нейронной сети"
    for i ∈ 0 .. N - 1
        yNS[i] ← 0
    "Задаем начальный вектор выходных значений АСР"
    for i ∈ 0 .. 12
        Y[0, i] ← 0
    Y[0, 2] ← 35.44
    Y[0, 3] ← 35.44
    "Задаем начальные условия для шима"
    for i ∈ 0 .. 1
        yshim[i] ← 0
    "Задаем начальные условия для има"
    yim ← 0
    "Задаем начальные условия для показателей качества"
    for i ∈ 0 .. 3
        I[i] ← 0
    In ← 0
    c ← 0
    flag ← 0
    "Задаем цикл(переходный процесс замкнутой АСР"
    for j ∈ 1 .. Tr/dt
        "Задаем возмущение"
        Y[j, 1] ← if(j < 1, 0, λ)
        "Задаем задание"
        Y[j, 2] ← if(j < 1, 30, u)
        "Задаем счетчик"
        Y[j, 0] ← dt*j
        "Сигнал рассогласования"
        g1 ← (Y[j, 2] - Y[j - 1, 3])
        In[0] ← g1
        In[1] ←
            Y[j - 1, 3] - Y[j - 2, 3] if j > 2
            0 otherwise
        Y[j, 11] ← g1
        "Отработка модуля нейронной сети"
        yNS ← HS(N, In, W, φ, yNS, x)
        "Выход нейронной сети"
        Y[j, 4] ← yNS[N - 1]
        yδ ← Y[j, 4]
        "Отработка модуля ШИМ"
        yshim ← Shim(yδ, yshim, CHIM, dt, x)
        " выход ШИМ"
        Y[j, 5] ← yshim[1]
        flag ← flag + 1 if yshim[1] ≠ Y[j - 1, 5]
        "Отработка модуля ИМ"
        yim ←
            IM(yim, 1, dt, L, ΔRO, TIM) if j < λ + 1
            IM(yim, yshim[1], dt, L, ΔRO, TIM) otherwise
        " выход ИМ"
        Y[j, 6] ← yim
        yλ ← Y[j, 6]
        Y[j, 12] ← yλ
        "Отработка модуля объекта"
        yob ← object(yob, yλ, dt)
        " выход Объекта"
        Y[j, 8] ← yob[1] + 35.44
        Y[j, 3] ← Y[j - 1, 3] if j ≤ floor(25/dt)
        Y[j, 3] ← Y[j - floor(25/dt), 8] otherwise
        "Расчет интегральных критериев"
        I[0] ← I[0] + dt*Y[j, 11]
        I[1] ← I[1] + dt*Y[j, 11]^2
        I[2] ← I[2] + dt*|Y[j, 11]|
        "Поиск 1-й и 3-й амлитуд"
        if Y[j, 3] < Y[j - 1, 3] and c == 0
            B1 ← Y[j - 1, 3]
            c ← 1
        c ← 2 if Y[j, 3] > Y[j - 1, 3] and (c == 1)
        if Y[j, 3] < Y[j - 1, 3] and c == 2
            B3 ← Y[j - 1, 3]
            c ← 3
        c ← 4 if Y[j, 3] > Y[j - 1, 3] and (c == 3)
    Y[0, 7] ← I[0]
    Y[1, 7] ← I[1]
    Y[2, 7] ← I[2]
    Y[4, 7] ← B1
    Y[5, 7] ←
        0 if B1 == 0
        1 - B3/B1 otherwise
    Y[6, 7] ← flag*30/Tr
    Y
y[2] ← φ(y[0]*x[0] + y[1]*x[1] + y[4]*x[7])
y[3] ← φ(y[0]*x[2] + y[1]*x[3] + y[4]*x[8])
y[4] ← φ(y[2]*x[4] + y[3]*x[5] + y[4]*x[9])
n := -30, -29.9 .. 10  # ч
ln(n + sqrt(n^2 + 1))
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(Y[j - 1, 3] - Y[j - 2, 3])^3 + nthroot(Y[j - 1, 3] - Y[j - 2, 3], 3)
In[0] ← g1*1000
In[1] ←
    (Y[j - 1, 3] - Y[j - 2, 3])*1000 if j > 2
    0 otherwise
In[0] ← g1^2*sign(g1)
In[1] ←
    ((Y[j - 1, 3] - Y[j - 2, 3])^2)*sign(Y[j - 1, 3] - Y[j - 2, 3]) if j > 2
    0 otherwise
Shim(y_NS, y, CHIM, dt, out)
analizy(x, N, Tr, dt, λ, u, φ, L, ΔRO, TIM, ASR) :=
    CHIM ← x[6]
    H ← ASR(N, Tr, dt, λ, u, φ, W, CHIM, L, ΔRO, TIM, HS, Shim, IM, object, x)
    H
0
Tr := 1500
N := 5
dt := 2
λ := 0
u1 := 60
L := 0
ΔRO := 100
TIM := 29
u2 := 35
λ1 := 10
u := 34
u3 := 115
u4 := 15
u5 := 20
Sqr(x) :=
    "задаем начальные значения для штрафов"
    str1 ← 0
    str2 ← 0
    str3 ← 0
    H ← 0
    "Цикл работает по количеству весовых коэффициентов"
    for k ∈ 0 .. 8
        xf[k] ← x[k]
    H ← analizy(xf, N, Tr, dt, λ, u1, φ, L, ΔRO, TIM, ASR)
    str2 ← if(H[6, 7] < 7, 0, 10^10)
    str1 ← if(x[6] > 0, 0, 10^10)
    str3 ← if(x[7] < 0, 0, 10^10)
    I ← H[2, 7] + str1 + str2 + str3
    I
str3 ← if(x[7] > 0, 0, 10^10)
str5 ← str5 + 10^2 if |K[i, 11]| > 0.5
str6 ← str6 + 10^2 if |R[i, 11]| > 0.5
.
K ← analizy(xf, N, Tr, dt, λ, u3, φ, L, ΔRO, TIM, ASR)
str1 ← if(x[6] > 0, 0, 10^10)
R ← analizy(xf, N, Tr, dt, λ, u2, φ, L, ΔRO, TIM, ASR)
for i ∈ 750 .. 1000
    str4 ← str4 + 10^2 if |H[i, 11]| > 0.5
    str3 ← str3 + 10^2 if |R[i, 11]| > 0.1
str5 ← str5 + 10^2 if |K[i, 11]| > 0.5
str6 ← str6 + 10^2 if |R[i, 11]| > 0.5
'
Opt(X0, ε, Sqr) :=
    z1 ← time(1)
    k ← 0
    N ← length(X0)
    as[:, 0] ← X0
    for j ∈ 1 .. N
        for i ∈ 0 .. N - 1
            as[i, j] ← X0[i] + 1/(N*sqrt(2))*(sqrt(N - 1) + N - 1) if j - 1 == i
            as[i, j] ← X0[i] + 1/(N*sqrt(2))*(sqrt(N - 1) - 1) otherwise
    for j ∈ 0 .. N
        as[N, j] ← Sqr(as[:, j])
    as ← rsort(as, N)
    while |as[N, N] - as[N, 0]| > ε
        a ← as
        for i ∈ 0 .. N - 1
            a[i, N + 1] ← 1/N*(sum(a[i, j], j = 0 .. N) - a[i, N])
            a[i, N + 2] ← a[i, N + 1] + 1*(a[i, N + 1] - a[i, N])
        a[N, N + 2] ← Sqr(a[:, N + 2])
        if a[N, N + 2] ≤ a[N, 0]
            for i ∈ 0 .. N - 1
                a[i, N + 3] ← a[i, N + 1] + 2*(a[i, N + 2] - a[i, N + 1])
            a[N, N + 3] ← Sqr(a[:, N + 3])
            a[:, N] ← a[:, N + 3] if a[N, N + 3] ≤ a[N, 0]
            a[:, N] ← a[:, N + 2] otherwise
        otherwise
            a[:, N] ← a[:, N + 2] if a[N, N + 2] < a[N, N - 1]
            otherwise
                a[:, N] ← a[:, N + 2] if a[N, N + 2] < a[N, N]
                for i ∈ 0 .. N - 1
                    a[i, N + 4] ← a[i, N + 1] + 0.5*(a[i, N] - a[i, N + 1])
                a[N, N + 4] ← Sqr(a[:, N + 4])
                if a[N, N + 4] ≥ a[N, N]
                    for j ∈ 1 .. N
                        for i ∈ 0 .. N - 1
                            a[i, j] ← a[i, 0] + 0.5*(a[i, j] - a[i, 0])
                        a[N, j] ← Sqr(a[:, j])
                a[:, N] ← a[:, N + 4] otherwise
        as ← 0
        for j ∈ 0 .. N
            as[:, j] ← a[:, j]
        as ← rsort(as, N)
        k ← k + 1
        if k > 500*N
            ads ← as[:, 0]
            ads[N + 1] ← "Alarm Program stop"
            ads[N + 2] ← k
            return ads
    ao ← as[:, 0]
    z2 ← time(2)
    Δt ← z2 - z1
    ao[N + 1] ← Δt
    ao
MGA(μ, xmax, xmin, ε, Sqr) :=
    z1 ← time(1)
    N ← length(xmax)
    m ← floor(((μ + N) + 1)/.9)
    for j ∈ 0 .. m
        for i ∈ 0 .. N - 1
            x[i, j] ← rnd(xmax[i] - xmin[i]) + xmin[i]
        x[N, j] ← Sqr(x[:, j])
    z ← 0
    x ← rsort(x, N)
    while 1/m*sum(|x[N, n] - x[N, 0]|, n = 0 .. m) > ε
        z ← z + 1
        r ← 0
        while r ≤ ceil(.1*m)
            r ← r + 1
            h ← 0
            while h == 0
                Mt ← 0
                for j ∈ 0 .. N
                    P[j] ← floor(rnd(.9*m))
                for j ∈ 1 .. N
                    for jj ∈ 0 .. j - 1
                        Mt ← 1 if P[jj] == P[j]
                h ← 1 if Mt == 0
            for j ∈ 0 .. N
                as[:, j] ← x[:, P[j]]
            k ← 0
            as ← rsort(as, N)
            while |as[N, N] - as[N, 0]| > ε
                a ← as
                for i ∈ 0 .. N - 1
                    a[i, N + 1] ← 1/N*(sum(a[i, j], j = 0 .. N) - a[i, N])
                    a[i, N + 2] ← a[i, N + 1] + 1.*(a[i, N + 1] - a[i, N])
                a[N, N + 2] ← Sqr(a[:, N + 2])
                if a[N, N + 2] ≤ a[N, 0]
                    for i ∈ 0 .. N - 1
                        a[i, N + 3] ← a[i, N + 1] + 2*(a[i, N + 2] - a[i, N + 1])
                    a[N, N + 3] ← Sqr(a[:, N + 3])
                    a[:, N] ← a[:, N + 3] if a[N, N + 3] ≤ a[N, 0]
                    a[:, N] ← a[:, N + 2] otherwise
                otherwise
                    a[:, N] ← a[:, N + 2] if a[N, N + 2] < a[N, N - 1]
                    a[:, N] ← a[:, N + 2] if a[N, N + 2] < a[N, N]
                    otherwise
                        for i ∈ 0 .. N - 1
                            a[i, N + 4] ← a[i, N + 1] + 0.5*(a[i, N] - a[i, N + 1])
                        a[N, N + 4] ← Sqr(a[:, N + 4])
                        if a[N, N + 4] ≥ a[N, N]
                            for j ∈ 1 .. N
                                for i ∈ 0 .. N - 1
                                    a[i, j] ← a[i, 0] + 0.5*(a[i, j] - a[i, 0])
                                a[N, j] ← Sqr(a[:, j])
                        a[:, N] ← a[:, N + 4] otherwise
                as ← 0
                for j ∈ 0 .. N
                    as[:, j] ← a[:, j]
                as ← rsort(as, N)
                k ← k + 1
                if k > 100*N
                    ads ← as[:, 0]
                    ads[N + 1] ← "Alarm Program stop in DM"
                    ads[N + 2] ← k
                    return ads
            x[:, floor(.9*m) + r] ← a[:, 0]
            x ← rsort(x, N)
            z2 ← time(1)
            Δt ← z2 - z1
            return x if z > 2*m
    xx ← x[:, 0]
    xx[N + 1] ← Δt
    xx
k := -5, -4.9 .. 5
xmin[7] := -100
xmax[7] := -5
ε := 0.01
e^k
n := 8
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xmin :=
    for i ∈ 0 .. n
        y[i] ← -5
    y
xmax :=
    for i ∈ 0 .. n
        y[i] ← 5
    y
μ := 50
Opt(x, ε, Sqr) =  # error: Эта переменная не определена.
[3.197; 6.012; 0.114; -2.306; -0.122; 2.791; 3.211; -2.317; -2.199; 3.2*10^3; 150.199]
'
MGA(μ, xmax, xmin, □, Sqr) =  # error: Пустой местозаполнитель.
[-4.466; -0.075; -0.226; 5.02; 0.796; -12.359; 3.625; -12.968; 1.959; 3.856*10^3; 348.934]
[-0.032; 1.331; 3.485; -4.325; -3.344; -0.341; 2.068; 0.345; -2.615; 5.843*10^4; 499.133]
[2.537; 0.699; -1.869; 3.319; -0.402; -0.505; 3.318; 0.058; -4.309; 2.989*10^3; 553.358]
[0.853; 2.14; -1.099; -0.798; -2.125; -2.118; 2.437; 0.489; -0.041; 6.534*10^4; 556.458]
HS1(N, In, W, φ, y, x) :=
    "Это ИНС"
    y[0] ← In[0]
    y[1] ← In[1]
    y[2] ← φ(y[0]*x[0] + y[1]*x[1])
    y[3] ← φ(y[0]*x[2] + y[1]*x[3])
    y[4] ← φ(y[2]*x[4] + y[3]*x[5] + y[4]*x[7])
    y
[-12.214; -5.084; -0.197; 6.497; 0.348; -14.442; 0.925; -15.066; 6.387; 3.697*10^3; 401.17]
x := [-12.214; -5.084; -0.197; 6.497; 0.348; -14.442; 0.925; -15.066; 6.387; 3.697*10^3; 401.17]
ε
Tr := 3000
dt := 2
q_60 := READPRN("C:\Users\ruskig\Desktop\temp.txt")
H := analizy(x, N, Tr, dt, 0, 60, φ, L, ΔRO, TIM, ASR)
q_90 := READPRN("C:\Users\ruskig\Desktop\temper.txt")
R := analizy(x, N, Tr, dt, 0, 90, φ, L, ΔRO, TIM, ASR)
pi_60 := READPRN("C:\Users\ruskig\Desktop\1.txt")
pi_90 := READPRN("C:\Users\ruskig\Desktop\2.txt")
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t := 0, 2 .. 3000
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