φ(k, b) := k*b
(e^b - e^(-b))/(e^b + e^(-b))
φ(b) := ln(b + sqrt(b^2 + 1))
Shim(y_NS, y, CHIM, dt) :=
    yish ← y[0] + dt*(y_NS - y[1])
    yr ← sign(yish)*1 if |yish| ≥ CHIM
    yr ← y[1] if |yish| < CHIM
    yr ← 0 if |yish| < .25*CHIM
    y ← [yish; yr]
HS(N, In, W, φ, y) :=
    "Это ИНС"
    X[0] ← y[0] + In[0]
    X[1] ← y[1] + In[1]
    for k ∈ 2 .. N - 1
        X[k] ← y[k]
    a ← transpose(W)*X
    for k ∈ 0 .. N - 1
        y[k] ← φ(a[k])
    y
ln(b + sqrt(b^2 + 1))
ё
ASR(N, Tr, dt, λ, u, φ, W, CHIM, L, ΔRO, TIM, HS, Shim, IM, object) :=
    "Задаем начальные условия объекта"
    g1 ← 0
    g2 ← 0
    for i ∈ 0 .. 3
        yob[i] ← 34
    "Задаем начальные условия нейронной сети"
    for i ∈ 0 .. N - 1
        yNS[i] ← 0
    "Задаем начальный вектор выходных значений АСР"
    for i ∈ 0 .. 12
        Y[0, i] ← 0
    Y[0, 2] ← 34
    Y[0, 3] ← 34
    "Задаем начальные условия для шима"
    for i ∈ 0 .. 1
        yshim[i] ← 0
    "Задаем начальные условия для има"
    yim ← 0
    "Задаем начальные условия для показателей качества"
    for i ∈ 0 .. 3
        I[i] ← 0
    In ← 0
    c ← 0
    flag ← 0
    "Задаем цикл(переходный процесс замкнутой АСР"
    for j ∈ 1 .. Tr/dt
        "Задаем возмущение"
        Y[j, 1] ← if(j < 1, 0, λ)
        "Задаем задание"
        Y[j, 2] ← if(j < 1, 34, u)
        "Задаем счетчик"
        Y[j, 0] ← dt*j
        "Сигнал рассогласования"
        g1 ← Y[j, 2] - Y[j - 1, 3]
        In[0] ← g1 - sign(g1)*0.008
        In[0] ← 0 if |g1| ≤ 0.008
        In[1] ← In[0] - Y[j - 1, 6]
        Y[j, 11] ← In[0]
        "Отработка модуля нейронной сети"
        yNS ← HS(N, In, W, φ, yNS)
        "Выход нейронной сети"
        Y[j, 4] ← yNS[N - 1]
        yδ ← Y[j, 4]
        "Отработка модуля ШИМ"
        yshim ← Shim(yδ, yshim, CHIM, dt)
        " выход ШИМ"
        Y[j, 5] ← yshim[1]
        flaf ← flag + 1 if yshim[1] ≠ Y[j - 1, 5]
        "Отработка модуля ИМ"
        yim ← IM(yim, yshim[1], dt, L, ΔRO, TIM)
        " выход ИМ"
        Y[j, 6] ← yim
        yλ ← Y[j, 1] + Y[j, 6]
        "Отработка модуля объекта"
        yob ← object(yob, yλ, dt)
        " выход Объекта"
        Y[j, 8] ← yob[1]
        Y[j, 3] ← Y[j - 1, 3] if j ≤ floor(8/dt)
        Y[j, 3] ← Y[j - floor(8/dt), 8] otherwise
        "Расчет интегральных критериев"
        I[0] ← I[0] + dt*Y[j, 11]
        I[1] ← I[1] + dt*Y[j, 11]^2
        I[2] ← I[2] + dt*|Y[j, 11]|
        "Поиск 1-й и 3-й амлитуд"
        if Y[j, 3] < Y[j - 1, 3] and c == 0
            B1 ← Y[j - 1, 3]
            c ← 1
        c ← 2 if Y[j, 3] > Y[j - 1, 3] and (c == 1)
        if Y[j, 3] < Y[j - 1, 3] and c == 2
            B3 ← Y[j - 1, 3]
            c ← 3
        c ← 4 if Y[j, 3] > Y[j - 1, 3] and (c == 3)
    Y[0, 7] ← I[0]
    Y[1, 7] ← I[1]
    Y[2, 7] ← I[2]
    Y[4, 7] ← B1
    Y[5, 7] ←
        0 if B1 == 0
        1 - B3/B1 otherwise
    Y[6, 7] ← flag*60/Tr
    Y
object(y, yμ, dt) :=
    "Это объект регулирования с передаточной функцией W(s)"
    A1 ← (1 - dt/235)*y[0] + 1.216*dt/235*yμ
    A2 ← (1 - dt/24)*y[1] + 1*dt/24*A1
    y ← [A1; A2]
    y
IM(y, yr, dt, L, ΔRO, TIM) :=
    yμ ← y + dt*sign(yr)*100/TIM
    yμ ← ΔRO if yμ > ΔRO
    yμ ← 0 if yμ < 0
    yμ ← yμ + L if yμ < y - L
    yμ ← yμ - L if yμ > y + L
    y ← yμ
    y
In[0] ← g1 - sign(g1)*0.3
In[0] ← 0 if |g1| ≤ 0.3
In[1] ← g2 - sign(g2)*0.15
In[1] ← 0 if |g2| ≤ 0.15
# g1[0] | g2[0]
yδ ← yNS[N - 1] - sign(yNS[N - 1])*0.1
yδ ← 0 if |yNS[N - 1]| ≤ 0.1
# In[0] | In[1]
analizy(x, N, Tr, dt, λ, u, φ, L, ΔRO, TIM, ASR) :=
    "Программа передачи синоптических коэффициентов из вектора х в матрицу W"
    for k ∈ 0 .. N - 1
        for k1 ∈ 0 .. N - 1
            W[k, k1] ← 0
    W[0, 2] ← x[0]
    W[0, 3] ← x[1]
    W[0, 4] ← x[2]
    W[1, 2] ← x[3]
    W[2, 3] ← x[4]
    W[3, 4] ← x[5]
    W[2, 5] ← x[6]
    W[3, 5] ← x[7]
    W[4, 5] ← x[8]
    CHIM ← x[9]
    H ← ASR(N, Tr, dt, λ, u, φ, W, CHIM, L, ΔRO, TIM, HS, Shim, IM, object)
    H
Tr := 1000
N := 6
dt := 1
λ := 0
u1 := 50
L := .01
ΔRO := 100
TIM := 29
u2 := 70
u3 := 90
λ1 := -10
u := 34
λ2 := -50
u4 := 110
Sqr(x) :=
    "задаем начальные значения для штрафов"
    str1 ← 0
    str2 ← 0
    str3 ← 0
    str4 ← 0
    H ← 0
    "Цикл работает по количеству весовых коэффициентов"
    for k ∈ 0 .. 9
        xf[k] ← x[k]
    H ← analizy(xf, N, Tr, dt, λ, u1, φ, L, ΔRO, TIM, ASR)
    Z ← analizy(xf, N, Tr, dt, λ, u2, φ, L, ΔRO, TIM, ASR)
    R ← analizy(xf, N, Tr, dt, λ, u3, φ, L, ΔRO, TIM, ASR)
    S ← analizy(xf, N, Tr, dt, λ, u4, φ, L, ΔRO, TIM, ASR)
    str1 ← if(x[9] > 0, 0, 10^10)
    str2 ← if(H[6, 7] < 8, 0, 10^10)
    for i ∈ 900, 901 .. 1000
        str3 ← str3 + 10^3 if |S[i, 3] - S[i, 2]| > 0.01
    for i ∈ 900, 901 .. 1000
        str4 ← str4 + 10^3 if |H[i, 3] - H[i, 2]| > 0.01
    I ← H[2, 7] + R[2, 7] + Z[2, 7] + S[2, 7] + str1 + str2 + str3 + str4
    I
.
str1 ← if(H[4, 7] < 15, 0, 10^20)
str3 ← if(H[5, 7] < .85, 10^6, 0)
str4 ← if(H[5, 7] > 0.95, 10^6, 0)
for i ∈ 400, 401 .. 500
    str3 ← str3 + 10^3 if |R[i, 3] - R[i, 2]| > 0.01
str1 ← if(H[3, 7] < .85, 10^6, 0)
str1 ← if(H[4, 7] > 0.02, 10^6, 0)
str2 ← if(H[5, 7] < .85, 10^6, 0)
str2 ← if(H[3, 7] > .95, 10^6, 0)
Opt(X0, ε, Sqr) :=
    z1 ← time(1)
    k ← 0
    N ← length(X0)
    as[:, 0] ← X0
    for j ∈ 1 .. N
        for i ∈ 0 .. N - 1
            as[i, j] ← X0[i] + 1/(N*sqrt(2))*(sqrt(N - 1) + N - 1) if j - 1 == i
            as[i, j] ← X0[i] + 1/(N*sqrt(2))*(sqrt(N - 1) - 1) otherwise
    for j ∈ 0 .. N
        as[N, j] ← Sqr(as[:, j])
    as ← rsort(as, N)
    while |as[N, N] - as[N, 0]| > ε
        a ← as
        for i ∈ 0 .. N - 1
            a[i, N + 1] ← 1/N*(sum(a[i, j], j = 0 .. N) - a[i, N])
            a[i, N + 2] ← a[i, N + 1] + 1*(a[i, N + 1] - a[i, N])
        a[N, N + 2] ← Sqr(a[:, N + 2])
        if a[N, N + 2] ≤ a[N, 0]
            for i ∈ 0 .. N - 1
                a[i, N + 3] ← a[i, N + 1] + 2*(a[i, N + 2] - a[i, N + 1])
            a[N, N + 3] ← Sqr(a[:, N + 3])
            a[:, N] ← a[:, N + 3] if a[N, N + 3] ≤ a[N, 0]
            a[:, N] ← a[:, N + 2] otherwise
        otherwise
            a[:, N] ← a[:, N + 2] if a[N, N + 2] < a[N, N - 1]
            otherwise
                a[:, N] ← a[:, N + 2] if a[N, N + 2] < a[N, N]
                for i ∈ 0 .. N - 1
                    a[i, N + 4] ← a[i, N + 1] + 0.5*(a[i, N] - a[i, N + 1])
                a[N, N + 4] ← Sqr(a[:, N + 4])
                if a[N, N + 4] ≥ a[N, N]
                    for j ∈ 1 .. N
                        for i ∈ 0 .. N - 1
                            a[i, j] ← a[i, 0] + 0.5*(a[i, j] - a[i, 0])
                        a[N, j] ← Sqr(a[:, j])
                a[:, N] ← a[:, N + 4] otherwise
        as ← 0
        for j ∈ 0 .. N
            as[:, j] ← a[:, j]
        as ← rsort(as, N)
        k ← k + 1
        if k > 500*N
            ads ← as[:, 0]
            ads[N + 1] ← "Alarm Program stop"
            ads[N + 2] ← k
            return ads
    ao ← as[:, 0]
    z2 ← time(2)
    Δt ← z2 - z1
    ao[N + 1] ← Δt
    ao
MGA(μ, xmax, xmin, ε, Sqr) :=
    z1 ← time(1)
    N ← length(xmax)
    m ← floor(((μ + N) + 1)/.9)
    for j ∈ 0 .. m
        for i ∈ 0 .. N - 1
            x[i, j] ← rnd(xmax[i] - xmin[i]) + xmin[i]
        x[N, j] ← Sqr(x[:, j])
    z ← 0
    x ← rsort(x, N)
    while 1/m*sum(|x[N, n] - x[N, 0]|, n = 0 .. m) > ε
        z ← z + 1
        r ← 0
        while r ≤ ceil(.1*m)
            r ← r + 1
            h ← 0
            while h == 0
                Mt ← 0
                for j ∈ 0 .. N
                    P[j] ← floor(rnd(.9*m))
                for j ∈ 1 .. N
                    for jj ∈ 0 .. j - 1
                        Mt ← 1 if P[jj] == P[j]
                h ← 1 if Mt == 0
            for j ∈ 0 .. N
                as[:, j] ← x[:, P[j]]
            k ← 0
            as ← rsort(as, N)
            while |as[N, N] - as[N, 0]| > ε
                a ← as
                for i ∈ 0 .. N - 1
                    a[i, N + 1] ← 1/N*(sum(a[i, j], j = 0 .. N) - a[i, N])
                    a[i, N + 2] ← a[i, N + 1] + 1.*(a[i, N + 1] - a[i, N])
                a[N, N + 2] ← Sqr(a[:, N + 2])
                if a[N, N + 2] ≤ a[N, 0]
                    for i ∈ 0 .. N - 1
                        a[i, N + 3] ← a[i, N + 1] + 2*(a[i, N + 2] - a[i, N + 1])
                    a[N, N + 3] ← Sqr(a[:, N + 3])
                    a[:, N] ← a[:, N + 3] if a[N, N + 3] ≤ a[N, 0]
                    a[:, N] ← a[:, N + 2] otherwise
                otherwise
                    a[:, N] ← a[:, N + 2] if a[N, N + 2] < a[N, N - 1]
                    a[:, N] ← a[:, N + 2] if a[N, N + 2] < a[N, N]
                    otherwise
                        for i ∈ 0 .. N - 1
                            a[i, N + 4] ← a[i, N + 1] + 0.5*(a[i, N] - a[i, N + 1])
                        a[N, N + 4] ← Sqr(a[:, N + 4])
                        if a[N, N + 4] ≥ a[N, N]
                            for j ∈ 1 .. N
                                for i ∈ 0 .. N - 1
                                    a[i, j] ← a[i, 0] + 0.5*(a[i, j] - a[i, 0])
                                a[N, j] ← Sqr(a[:, j])
                        a[:, N] ← a[:, N + 4] otherwise
                as ← 0
                for j ∈ 0 .. N
                    as[:, j] ← a[:, j]
                as ← rsort(as, N)
                k ← k + 1
                if k > 100*N
                    ads ← as[:, 0]
                    ads[N + 1] ← "Alarm Program stop in DM"
                    ads[N + 2] ← k
                    return ads
            x[:, floor(.9*m) + r] ← a[:, 0]
            x ← rsort(x, N)
            z2 ← time(1)
            Δt ← z2 - z1
            return x if z > 2*m
    xx ← x[:, 0]
    xx[N + 1] ← Δt
    xx
n := 9
ε := 0.001
xmin :=
    for i ∈ 0 .. n
        y[i] ← -5
    y
xmax :=
    for i ∈ 0 .. n
        y[i] ← 5
    y
μ := 30
Opt(x, ε, Sqr) =  # error: Эта переменная не определена.
'
9.884*10^4/10^3 = 98.84
MGA(μ, xmax, xmin, □, Sqr) =  # error: Пустой местозаполнитель.
x := [-1.043; -0.307; 2.544; -0.509; 5.593; 1.381; -3.214; 2.665; 0.796; 9.464; 2.214*10^5; 538.681]
ε
H := analizy(x, N, Tr, dt, λ, u1, φ, L, ΔRO, TIM, ASR)
Hch := READPRN("C:\Users\Igor\Desktop\Novaya_papka\H.txt")  # error: Не удается открыть файл данных.
Z := analizy(x, N, Tr, dt, λ, u2, φ, L, ΔRO, TIM, ASR)
λ1 := -10
λ2 := -1
R := analizy(x, N, Tr, dt, λ, u3, φ, L, ΔRO, TIM, ASR)
λ3 := -20
λ4 := -50
S := analizy(x, N, Tr, dt, λ, u4, φ, L, ΔRO, TIM, ASR)
Q := analizy(x, N, Tr, dt, λ1, u, φ, L, ΔRO, TIM, ASR)
E := analizy(x, N, Tr, dt, λ2, u, φ, L, ΔRO, TIM, ASR)
T := analizy(x, N, Tr, dt, λ3, u, φ, L, ΔRO, TIM, ASR)
U := analizy(x, N, Tr, dt, λ4, u, φ, L, ΔRO, TIM, ASR)
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□ °C
H =  # no stored result
R =  # no stored result
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