# [area: ФА и ИНС]
φ(b) := ln(b + sqrt(b^2 + 1))
HS(N, In, W, φ, y, x) :=
    "Это ИНС"
    y[0] ← In[0]
    y[1] ← In[1]
    y[2] ← φ(y[0]*x[0] + y[1]*x[1])
    y[3] ← φ(y[0]*x[2] + y[1]*x[3])
    y[4] ← φ(y[2]*x[4] + y[3]*x[5] + y[4]*x[6])
    y
# [area: ШИМ]
pos(y_NS, y, dt, ΔRO, TIM, timp, C) :=
    hys ← 100/TIM*timp
    CHIM ← hys*C
    yish ← y[0] + dt*y[1]*100/TIM
    yish ← y[1]*ΔRO if |yish| > ΔRO
    yr ← y_NS - yish + y[2]
    yimp ← sign(yr) if |yr| > CHIM
    yimp ← 0 if |yr| < CHIM
    yr ← yimp*hys
    y ← [yish; yimp; yr]
# [area: ИМ]
IM(y, yr, dt, L, ΔRO, TIM) :=
    yμ ← y + dt*sign(yr)*100/TIM
    yμ ← sign(yμ)*ΔRO if |yμ| > ΔRO
    y ← yμ
    y
# [area: Объект]
object(y, yμ, dt) :=
    "Это объект регулирования с передаточной функцией W(s)"
    A1 ← (1 - dt/235)*y[0] + 1.216*dt/235*yμ
    A2 ← (1 - dt/24)*y[1] + 1*dt/24*A1
    y ← [A1; A2]
    y
# [area: АСР]
ASR(N, Tr, dt, λ, u, φ, W, L, ΔRO, TIM, HS, pos, IM, object, x, timp, C) :=
    "Задаем начальные условия объекта"
    g1 ← 0
    g2 ← 0
    for i ∈ 0 .. 1
        yob[i] ← 0
    "Задаем начальные условия нейронной сети"
    for i ∈ 0 .. N - 1
        yNS[i] ← 0
    "Задаем начальный вектор выходных значений АСР"
    for i ∈ 0 .. 12
        Y[0, i] ← 0
    "Задаем начальные условия для шима"
    for i ∈ 0 .. 2
        ypos[i] ← 0
    "Задаем начальные условия для има"
    yim ← 0
    "Задаем начальные условия для показателей качества"
    for i ∈ 0 .. 3
        I_1[i] ← 0
    b ← 0
    c ← 0
    "Задаем цикл АСР"
    for j ∈ 1 .. Tr/dt
        "Задаем возмущение"
        Y[j, 1] ← if(j < 1, 0, λ)
        "Задаем задание"
        Y[j, 2] ← if(j < 1, 0, u)
        "Задаем счетчик"
        Y[j, 0] ← dt*j
        "Сигнал рассогласования"
        In[0] ← Y[j, 2] - Y[j - 1, 7]
        In[1] ←
            Y[j - 1, 7] - Y[j - 2, 7] if j > 2
            0 otherwise
        Y[j, 8] ← In[0]
        Y[j, 9] ← In[1]
        yNS ← HS(N, In, W, φ, yNS, x)
        Y[j, 3] ← yNS[N - 1]
        yδ ← Y[j, 3]
        ypos ← pos(yδ, ypos, dt, ΔRO, TIM, timp, C)
        Y[j, 4] ← ypos[1]
        yim ← IM(yim, ypos[1], dt, L, ΔRO, TIM)
        Y[j, 5] ← yim
        yλ ← Y[j, 1] + Y[j, 5]
        yob ← object(yob, yλ, dt)
        Y[j, 6] ← yob[1]
        Y[j, 7] ← Y[j - 1, 7] if j ≤ floor(8/dt)
        Y[j, 7] ← Y[j - floor(8/dt), 6] otherwise
        "Расчет интегральных критериев"
        I_1[2] ← I_1[2] + dt*|Y[j, 8]|
        "Поиск 1-й и 3-й амлитуд"
        if Y[j, 7] < Y[j - 1, 7] and b == 0
            A1 ← Y[j - 1, 7]
            b ← 1
        b ← 2 if Y[j, 7] > Y[j - 1, 7] and (b == 1)
        if Y[j, 7] < Y[j - 1, 7] and b == 2
            A3 ← Y[j - 1, 7]
            b ← 3
        b ← 4 if Y[j, 7] > Y[j - 1, 7] and (b == 3)
    Y[0, 10] ← I_1[2]
    Y[1, 10] ← A1
    Y[2, 10] ←
        0 if A1 == 0
        1 - A3/A1 otherwise
    Y
# [area: Структура ИНС]
analizy(x, N, Tr, dt, λ, u, φ, L, ΔRO, TIM, ASR, timp, C) :=
    H ← ASR(N, Tr, dt, λ, u, φ, W, L, ΔRO, TIM, HS, pos, IM, object, x, timp, C)
    H
# [area: Параметры + Функция цели]
Tr := 1000
N := 5
dt := 1
λ := 0
u := 1
L := .01
ΔRO := 100
TIM := 29
timp := 0.1
C := 1.5
Sqr(x) :=
    H ← 0
    "Цикл работает по количеству весовых коэффициентов"
    for k ∈ 0 .. 6
        xf[k] ← x[k]
    H ← analizy(xf, N, Tr, dt, λ, u, φ, L, ΔRO, TIM, ASR, timp, C)
    I ← H[0, 10]
    I
str3 ← if(H[5, 7] < .85, 10^6, 0)
str2 ← if(H[4, 19] < .85, 10^6, 0)
str1 ← if(H[5, 7] < .85, 10^6, 0)
# [area: OPT+ MGA]
MGA(μ, xmax, xmin, ε, Sqr) :=
    z1 ← time(1)
    N ← length(xmax)
    m ← floor(((μ + N) + 1)/.9)
    for j ∈ 0 .. m
        for i ∈ 0 .. N - 1
            x[i, j] ← rnd(xmax[i] - xmin[i]) + xmin[i]
        x[N, j] ← Sqr(x[:, j])
    z ← 0
    x ← rsort(x, N)
    while 1/m*sum(|x[N, n] - x[N, 0]|, n = 0 .. m) > ε
        z ← z + 1
        r ← 0
        while r ≤ ceil(.1*m)
            r ← r + 1
            h ← 0
            while h == 0
                Mt ← 0
                for j ∈ 0 .. N
                    P[j] ← floor(rnd(.9*m))
                for j ∈ 1 .. N
                    for jj ∈ 0 .. j - 1
                        Mt ← 1 if P[jj] == P[j]
                h ← 1 if Mt == 0
            for j ∈ 0 .. N
                as[:, j] ← x[:, P[j]]
            k ← 0
            as ← rsort(as, N)
            while |as[N, N] - as[N, 0]| > ε
                a ← as
                for i ∈ 0 .. N - 1
                    a[i, N + 1] ← 1/N*(sum(a[i, j], j = 0 .. N) - a[i, N])
                    a[i, N + 2] ← a[i, N + 1] + 1.*(a[i, N + 1] - a[i, N])
                a[N, N + 2] ← Sqr(a[:, N + 2])
                if a[N, N + 2] ≤ a[N, 0]
                    for i ∈ 0 .. N - 1
                        a[i, N + 3] ← a[i, N + 1] + 2*(a[i, N + 2] - a[i, N + 1])
                    a[N, N + 3] ← Sqr(a[:, N + 3])
                    a[:, N] ← a[:, N + 3] if a[N, N + 3] ≤ a[N, 0]
                    a[:, N] ← a[:, N + 2] otherwise
                otherwise
                    a[:, N] ← a[:, N + 2] if a[N, N + 2] < a[N, N - 1]
                    a[:, N] ← a[:, N + 2] if a[N, N + 2] < a[N, N]
                    otherwise
                        for i ∈ 0 .. N - 1
                            a[i, N + 4] ← a[i, N + 1] + 0.5*(a[i, N] - a[i, N + 1])
                        a[N, N + 4] ← Sqr(a[:, N + 4])
                        if a[N, N + 4] ≥ a[N, N]
                            for j ∈ 1 .. N
                                for i ∈ 0 .. N - 1
                                    a[i, j] ← a[i, 0] + 0.5*(a[i, j] - a[i, 0])
                                a[N, j] ← Sqr(a[:, j])
                        a[:, N] ← a[:, N + 4] otherwise
                as ← 0
                for j ∈ 0 .. N
                    as[:, j] ← a[:, j]
                as ← rsort(as, N)
                k ← k + 1
                if k > 10000*N
                    ads ← as[:, 0]
                    ads[N + 1] ← "Alarm Program stop in DM"
                    ads[N + 2] ← k
                    return ads
            x[:, floor(.9*m) + r] ← a[:, 0]
            x ← rsort(x, N)
            z2 ← time(1)
            Δt ← z2 - z1
            return x if z > 2*m
    xx ← x[:, 0]
    xx[N + 1] ← Δt
    xx
Opt(X0, ε, Sqr) :=
    z1 ← time(1)
    k ← 0
    N ← length(X0)
    as[:, 0] ← X0
    for j ∈ 1 .. N
        for i ∈ 0 .. N - 1
            as[i, j] ← X0[i] + 1/(N*sqrt(2))*(sqrt(N - 1) + N - 1) if j - 1 == i
            as[i, j] ← X0[i] + 1/(N*sqrt(2))*(sqrt(N - 1) - 1) otherwise
    for j ∈ 0 .. N
        as[N, j] ← Sqr(as[:, j])
    as ← rsort(as, N)
    while |as[N, N] - as[N, 0]| > ε
        a ← as
        for i ∈ 0 .. N - 1
            a[i, N + 1] ← 1/N*(sum(a[i, j], j = 0 .. N) - a[i, N])
            a[i, N + 2] ← a[i, N + 1] + 1*(a[i, N + 1] - a[i, N])
        a[N, N + 2] ← Sqr(a[:, N + 2])
        if a[N, N + 2] ≤ a[N, 0]
            for i ∈ 0 .. N - 1
                a[i, N + 3] ← a[i, N + 1] + 2*(a[i, N + 2] - a[i, N + 1])
            a[N, N + 3] ← Sqr(a[:, N + 3])
            a[:, N] ← a[:, N + 3] if a[N, N + 3] ≤ a[N, 0]
            a[:, N] ← a[:, N + 2] otherwise
        otherwise
            a[:, N] ← a[:, N + 2] if a[N, N + 2] < a[N, N - 1]
            otherwise
                a[:, N] ← a[:, N + 2] if a[N, N + 2] < a[N, N]
                for i ∈ 0 .. N - 1
                    a[i, N + 4] ← a[i, N + 1] + 0.5*(a[i, N] - a[i, N + 1])
                a[N, N + 4] ← Sqr(a[:, N + 4])
                if a[N, N + 4] ≥ a[N, N]
                    for j ∈ 1 .. N
                        for i ∈ 0 .. N - 1
                            a[i, j] ← a[i, 0] + 0.5*(a[i, j] - a[i, 0])
                        a[N, j] ← Sqr(a[:, j])
                a[:, N] ← a[:, N + 4] otherwise
        as ← 0
        for j ∈ 0 .. N
            as[:, j] ← a[:, j]
        as ← rsort(as, N)
        k ← k + 1
        if k > 500*N
            ads ← as[:, 0]
            ads[N + 1] ← "Alarm Program stop"
            ads[N + 2] ← k
            return ads
    ao ← as[:, 0]
    z2 ← time(2)
    Δt ← z2 - z1
    ao[N + 1] ← Δt
    ao
# [area: Оптимизация]
ε := 1
μ := 25
k := 6
min := -5
max := 5
xmin :=
    for i ∈ 0 .. k
        xmin[i] ← min
        xmin
xmax :=
    for i ∈ 0 .. k
        xmax[i] ← max
        xmax
'
ε
MGA(μ, xmax, xmin, □, Sqr) =  # error: Пустой местозаполнитель.
Opt(xmax, □, Sqr) =  # error
x := [-1.19; 15.78; -3.64; 19.99; -39.22; -8.31; -0.28; 58.05; 20.72]
dt := 1
λ := 0
u := 25
Tr := 1000
1.878*10^3/3600 = 0.521667
H := analizy(x, N, Tr, dt, λ, u, φ, L, ΔRO, TIM, ASR, timp, C)
# [area: Графики]
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H =  # no stored result
